new TCC_Curve.Curva_IT_101 npts=8 c_array=(1.0   1.5   1.7   2.0   2.5   3.0   6.0   10.0)
~                        t_array=(0.140 0.036 0.025 0.022 0.018 0.016 0.015 0.015)
new TCC_Curve.Curva_IT_133 npts=7 c_array=(1.0  10.0  15.0  25.0  35.0  50.0  100.0)
~                        t_array=(14.0 0.16  0.09  0.052 0.042 0.039 0.039)
