New LineCode.TRONCAL nphases=3 R1=0.269 X1=0.36 R0=0.269 X0=0.36 units=km
New LineCode.DERIVACION nphases=3 R1=0.461 X1=0.382 R0=0.461 X0=0.382 units=km
New LineCode.RAMAL nphases=3 R1=0.868 X1=0.41 R0=0.868 X0=0.41 units=km
