! DU_1_Capacitors_391_BRR_RBRR1303
New "Capacitor.CAP_295BC000020109" bus1="MT443501845263981BR03.1.2.3" kvar=600.0 kv=13.8 phases=3 conn=Delta
New "CapControl.C1ctrl_295BC000020109" element="Line.SMT_284552762_F" Capacitor=CAP_295BC000020109 Type=voltage ptratio=60 ON=218.5 OFF=230.0
