! DU_1_CargasMT_391_BRR_RBRR1303
New "Load.MT_04d2f0f500b53bbab19290de267652118bcd262546d385d3528302d00ad3950e_M1" bus1="MT447457345390681BR03.1.2.3" phases=3 conn=Delta model=2 kv=13.8 kw=9.0655991 pf=0.92 daily="MT-TIPO5_DU" status=variable vmaxpu=1.5 vminpu=0.93
New "Load.MT_04d2f0f500b53bbab19290de267652118bcd262546d385d3528302d00ad3950e_M2" bus1="MT447457345390681BR03.1.2.3" phases=3 conn=Delta model=3 kv=13.8 kw=9.0655991 pf=0.92 daily="MT-TIPO5_DU" status=variable vmaxpu=1.5 vminpu=0.93
New "Load.MT_36e54d72d3860790f767b34524f07ceb6c281c933fcaf1efeafbb0dc4f3ca5c1_M1" bus1="MT4423298345194693BR03.1.2.3" phases=3 conn=Delta model=2 kv=13.8 kw=4.0276685 pf=0.92 daily="MT-TIPO4_DU" status=variable vmaxpu=1.5 vminpu=0.93
New "Load.MT_36e54d72d3860790f767b34524f07ceb6c281c933fcaf1efeafbb0dc4f3ca5c1_M2" bus1="MT4423298345194693BR03.1.2.3" phases=3 conn=Delta model=3 kv=13.8 kw=4.0276685 pf=0.92 daily="MT-TIPO4_DU" status=variable vmaxpu=1.5 vminpu=0.93
New "Load.MT_380e3f07314ee09ce1ebe1ceb94252e70d5a3da022de9baf013b0859464ce5aa_M1" bus1="MT4449721545397572BR03.1.2.3" phases=3 conn=Delta model=2 kv=13.8 kw=49.2282759 pf=0.92 daily="MT-TIPO2_DU" status=variable vmaxpu=1.5 vminpu=0.93
New "Load.MT_380e3f07314ee09ce1ebe1ceb94252e70d5a3da022de9baf013b0859464ce5aa_M2" bus1="MT4449721545397572BR03.1.2.3" phases=3 conn=Delta model=3 kv=13.8 kw=49.2282759 pf=0.92 daily="MT-TIPO2_DU" status=variable vmaxpu=1.5 vminpu=0.93
New "Load.MT_3ef0e858d31a3ada883f016aee868c98b5f2409c182c71752458a89de7123dbd_M1" bus1="MT4479351745298869BR03.1.2.3" phases=3 conn=Delta model=2 kv=13.8 kw=541.8869278 pf=0.92 daily="MT-TIPO4_DU" status=variable vmaxpu=1.5 vminpu=0.93
New "Load.MT_3ef0e858d31a3ada883f016aee868c98b5f2409c182c71752458a89de7123dbd_M2" bus1="MT4479351745298869BR03.1.2.3" phases=3 conn=Delta model=3 kv=13.8 kw=541.8869278 pf=0.92 daily="MT-TIPO4_DU" status=variable vmaxpu=1.5 vminpu=0.93
New "Load.MT_43cba488fa35cc6816ff935ad2d925f17dfdf8d010302808af2046b70b5cea3c_M1" bus1="MT446427645418188BR03.1.2.3" phases=3 conn=Delta model=2 kv=13.8 kw=14.8022409 pf=0.92 daily="MT-TIPO7_DU" status=variable vmaxpu=1.5 vminpu=0.93
New "Load.MT_43cba488fa35cc6816ff935ad2d925f17dfdf8d010302808af2046b70b5cea3c_M2" bus1="MT446427645418188BR03.1.2.3" phases=3 conn=Delta model=3 kv=13.8 kw=14.8022409 pf=0.92 daily="MT-TIPO7_DU" status=variable vmaxpu=1.5 vminpu=0.93
New "Load.MT_64f4265bb40f38c1d32c6eebb59c24da50f6f7f5f0315284fbe4f4d616ae186c_M1" bus1="MT4426842845228913BR03.1.2.3" phases=3 conn=Delta model=2 kv=13.8 kw=26.5390576 pf=0.92 daily="MT-TIPO5_DU" status=variable vmaxpu=1.5 vminpu=0.93
New "Load.MT_64f4265bb40f38c1d32c6eebb59c24da50f6f7f5f0315284fbe4f4d616ae186c_M2" bus1="MT4426842845228913BR03.1.2.3" phases=3 conn=Delta model=3 kv=13.8 kw=26.5390576 pf=0.92 daily="MT-TIPO5_DU" status=variable vmaxpu=1.5 vminpu=0.93
New "Load.MT_a09dec13bc37006c55f9259ddd766e204ce3b8e8fc2fe99674cd942cecdf6354_M1" bus1="MT4435426545267371BR03.1.2.3" phases=3 conn=Delta model=2 kv=13.8 kw=288.0684259 pf=0.92 daily="MT-TIPO5_DU" status=variable vmaxpu=1.5 vminpu=0.93
New "Load.MT_a09dec13bc37006c55f9259ddd766e204ce3b8e8fc2fe99674cd942cecdf6354_M2" bus1="MT4435426545267371BR03.1.2.3" phases=3 conn=Delta model=3 kv=13.8 kw=288.0684259 pf=0.92 daily="MT-TIPO5_DU" status=variable vmaxpu=1.5 vminpu=0.93
New "Load.MT_a5cecdd0b4c838e85f0d098aa9340b348e31b89c2babf72b5fa64ccd7358ed99_M1" bus1="MT4455485745424538BR03.1.2.3" phases=3 conn=Delta model=2 kv=13.8 kw=24.4091398 pf=0.92 daily="MT-TIPO7_DU" status=variable vmaxpu=1.5 vminpu=0.93
New "Load.MT_a5cecdd0b4c838e85f0d098aa9340b348e31b89c2babf72b5fa64ccd7358ed99_M2" bus1="MT4455485745424538BR03.1.2.3" phases=3 conn=Delta model=3 kv=13.8 kw=24.4091398 pf=0.92 daily="MT-TIPO7_DU" status=variable vmaxpu=1.5 vminpu=0.93
New "Load.MT_ac1844e283d78186a72df2308d756eeb61f477e99c46f6cb780b02d3c4611433_M1" bus1="MT4451424445388702BR03.1.2.3" phases=3 conn=Delta model=2 kv=13.8 kw=6.9831297 pf=0.92 daily="MT-TIPO4_DU" status=variable vmaxpu=1.5 vminpu=0.93
New "Load.MT_ac1844e283d78186a72df2308d756eeb61f477e99c46f6cb780b02d3c4611433_M2" bus1="MT4451424445388702BR03.1.2.3" phases=3 conn=Delta model=3 kv=13.8 kw=6.9831297 pf=0.92 daily="MT-TIPO4_DU" status=variable vmaxpu=1.5 vminpu=0.93
New "Load.MT_b109cabe34565832c2b9530d80583897e6a7727de0e23b6402908768c603cd05_M1" bus1="MT4420087945171555BR03.1.2.3" phases=3 conn=Delta model=2 kv=13.8 kw=34.6144317 pf=0.92 daily="MT-TIPO7_DU" status=variable vmaxpu=1.5 vminpu=0.93
New "Load.MT_b109cabe34565832c2b9530d80583897e6a7727de0e23b6402908768c603cd05_M2" bus1="MT4420087945171555BR03.1.2.3" phases=3 conn=Delta model=3 kv=13.8 kw=34.6144317 pf=0.92 daily="MT-TIPO7_DU" status=variable vmaxpu=1.5 vminpu=0.93
New "Load.MT_c73b212401b03ceee2892381b9b1be62136b1b6b8746b3c754ab2bf83dbb135c_M1" bus1="MT4454162345407603BR03.1.2.3" phases=3 conn=Delta model=2 kv=13.8 kw=63.4990051 pf=0.92 daily="MT-TIPO7_DU" status=variable vmaxpu=1.5 vminpu=0.93
New "Load.MT_c73b212401b03ceee2892381b9b1be62136b1b6b8746b3c754ab2bf83dbb135c_M2" bus1="MT4454162345407603BR03.1.2.3" phases=3 conn=Delta model=3 kv=13.8 kw=63.4990051 pf=0.92 daily="MT-TIPO7_DU" status=variable vmaxpu=1.5 vminpu=0.93
New "Load.MT_c9fa78aeaba929da8b96a6a3b77336bd638178905cff51cdc3e764b1df7e4159_M1" bus1="MT4463725345397855BR03.1.2.3" phases=3 conn=Delta model=2 kv=13.8 kw=62.9854339 pf=0.92 daily="MT-TIPO4_DU" status=variable vmaxpu=1.5 vminpu=0.93
New "Load.MT_c9fa78aeaba929da8b96a6a3b77336bd638178905cff51cdc3e764b1df7e4159_M2" bus1="MT4463725345397855BR03.1.2.3" phases=3 conn=Delta model=3 kv=13.8 kw=62.9854339 pf=0.92 daily="MT-TIPO4_DU" status=variable vmaxpu=1.5 vminpu=0.93
New "Load.MT_ceb652c20cd4d860832497b9f94e90ff0ef05433560d6922f632756b0956611a_M1" bus1="MT4458720345449655BR03.1.2.3" phases=3 conn=Delta model=2 kv=13.8 kw=70.5879395 pf=0.92 daily="MT-TIPO4_DU" status=variable vmaxpu=1.5 vminpu=0.93
New "Load.MT_ceb652c20cd4d860832497b9f94e90ff0ef05433560d6922f632756b0956611a_M2" bus1="MT4458720345449655BR03.1.2.3" phases=3 conn=Delta model=3 kv=13.8 kw=70.5879395 pf=0.92 daily="MT-TIPO4_DU" status=variable vmaxpu=1.5 vminpu=0.93
New "Load.MT_e4d0cf567903720517e13ef462884bec1d3a40c14a75025312eef117781cd374_M1" bus1="MT4459911145431903BR03.1.2.3" phases=3 conn=Delta model=2 kv=13.8 kw=221.2153296 pf=0.92 daily="MT-TIPO2_DU" status=variable vmaxpu=1.5 vminpu=0.93
New "Load.MT_e4d0cf567903720517e13ef462884bec1d3a40c14a75025312eef117781cd374_M2" bus1="MT4459911145431903BR03.1.2.3" phases=3 conn=Delta model=3 kv=13.8 kw=221.2153296 pf=0.92 daily="MT-TIPO2_DU" status=variable vmaxpu=1.5 vminpu=0.93
