! DU_1_ChavesMT_391_BRR_RBRR1303
New "Line.CMT_270BF005328839" phases=1 bus1="MT4535865945144658BR03.1" bus2="MT2998675ID.1" r1=0.001 r0=0.001 x1=0 x0=0 c1=0 c0=0 length=0.001 Switch=y
!New "Line.CMT_295BF000003989" phases=3 bus1="MT4451281545365983BR03.1.2.3" bus2="MT2989142ID.1.2.3" r1=0.001 r0=0.001 x1=0 x0=0 c1=0 c0=0 length=0.001 Switch=y
New "Line.CMT_295BF005509399" phases=3 bus1="MT4489371145222952BR03.1.2.3" bus2="MT65084216ID.1.2.3" r1=0.001 r0=0.001 x1=0 x0=0 c1=0 c0=0 length=0.001 Switch=y
New "Line.CMT_270BF000256249" phases=3 bus1="MT4497889245586667BR03.1.2.3" bus2="MT2982815ID.1.2.3" r1=0.001 r0=0.001 x1=0 x0=0 c1=0 c0=0 length=0.001 Switch=y
!New "Line.CMT_295BF005092549" phases=1 bus1="MT4570824644623311BRMT.2.4" bus2="MT2982018ID.2.4" r1=0.001 r0=0.001 x1=0 x0=0 c1=0 c0=0 length=0.001 Switch=y
New "Line.CMT_295BF005222139" phases=1 bus1="MT4647331244657003BR03.1" bus2="MT2992389ID.1" r1=0.001 r0=0.001 x1=0 x0=0 c1=0 c0=0 length=0.001 Switch=y
New "Line.CMT_295FF000004069" phases=3 bus1="MT4510936745157588BR03.1.2.3" bus2="MT2982367ID.1.2.3" r1=0.001 r0=0.001 x1=0 x0=0 c1=0 c0=0 length=0.001 Switch=y
New "Line.CMT_295BF005535199" phases=1 bus1="MT4488336945260658BR03.3" bus2="MT108835724ID.3" r1=0.001 r0=0.001 x1=0 x0=0 c1=0 c0=0 length=0.001 Switch=y
New "Line.CMT_270FF000254109" phases=3 bus1="MT4544136345108951BR03.1.2.3" bus2="MT2986808ID.1.2.3" r1=0.001 r0=0.001 x1=0 x0=0 c1=0 c0=0 length=0.001 Switch=y
New "Line.CMT_295BF005317259" phases=3 bus1="MT446233645391801BR03.1.2.3" bus2="MT2984800ID.1.2.3" r1=0.001 r0=0.001 x1=0 x0=0 c1=0 c0=0 length=0.001 Switch=y
New "Line.CMT_295BF005516209" phases=1 bus1="MT4489437345148096BR03.1" bus2="MT78335462ID.1" r1=0.001 r0=0.001 x1=0 x0=0 c1=0 c0=0 length=0.001 Switch=y
New "Line.CMT_270BF005381869" phases=1 bus1="MT4534980645148234BR03.2" bus2="MT2992073ID.2" r1=0.001 r0=0.001 x1=0 x0=0 c1=0 c0=0 length=0.001 Switch=y
New "Line.CMT_295BF000007439" phases=1 bus1="MT4648721344788767BR03.2" bus2="MT2986763ID.2" r1=0.001 r0=0.001 x1=0 x0=0 c1=0 c0=0 length=0.001 Switch=y
New "Line.CMT_295BF005179079" phases=1 bus1="MT4546163644757054BR03.2" bus2="MT2983281ID.2" r1=0.001 r0=0.001 x1=0 x0=0 c1=0 c0=0 length=0.001 Switch=y
New "Line.CMT_270BF000254119" phases=3 bus1="MT4550173245056136BR03.1.2.3" bus2="MT2998987ID.1.2.3" r1=0.001 r0=0.001 x1=0 x0=0 c1=0 c0=0 length=0.001 Switch=y
!New "Line.CMT_295CF000001439" phases=3 bus1="MT4439172645286692BR03.1.2.3" bus2="MT2988342ID.1.2.3" r1=0.001 r0=0.001 x1=0 x0=0 c1=0 c0=0 length=0.001 Switch=y
New "Line.CMT_295BF000007429" phases=1 bus1="MT4635862744771213BR03.2" bus2="MT2991633ID.2" r1=0.001 r0=0.001 x1=0 x0=0 c1=0 c0=0 length=0.001 Switch=y
New "Line.CMT_295CF005557269" phases=3 bus1="MT4458280145449392BR03.1.2.3" bus2="MT124734460ID.1.2.3" r1=0.001 r0=0.001 x1=0 x0=0 c1=0 c0=0 length=0.001 Switch=y
New "Line.CMT_295BF000006929" phases=3 bus1="MT4470709545362843BR03.1.2.3" bus2="MT2995890ID.1.2.3" r1=0.001 r0=0.001 x1=0 x0=0 c1=0 c0=0 length=0.001 Switch=y
New "Line.CMT_270BF000254099" phases=3 bus1="MT4536301645139089BR03.1.2.3" bus2="MT2992921ID.1.2.3" r1=0.001 r0=0.001 x1=0 x0=0 c1=0 c0=0 length=0.001 Switch=y
New "Line.CMT_295BR005033649" phases=3 bus1="MT4563028544658538BR03.1.2.3" bus2="MT2987008ID.1.2.3" r1=0.001 r0=0.001 x1=0 x0=0 c1=0 c0=0 length=0.001 Switch=y
New "Line.CMT_295BR000007349" phases=3 bus1="MT455744364471185BR03.1.2.3" bus2="MT2996096ID.1.2.3" r1=0.001 r0=0.001 x1=0 x0=0 c1=0 c0=0 length=0.001 Switch=y
New "Line.CMT_295CF005292399" phases=3 bus1="MT4467595645363756BR03.1.2.3" bus2="MT2980962ID.1.2.3" r1=0.001 r0=0.001 x1=0 x0=0 c1=0 c0=0 length=0.001 Switch=y
New "Line.CMT_295BF005306489" phases=1 bus1="MT4662355844810469BR03.2" bus2="MT2983880ID.2" r1=0.001 r0=0.001 x1=0 x0=0 c1=0 c0=0 length=0.001 Switch=y
New "Line.CMT_270BF006011889" phases=2 bus1="MT4497735945596713BR03.3.1" bus2="MT309508653ID.3.1" r1=0.001 r0=0.001 x1=0 x0=0 c1=0 c0=0 length=0.001 Switch=y
New "Line.CMT_295BF005306469" phases=1 bus1="MT4644751944783464BR03.2" bus2="MT2994761ID.2" r1=0.001 r0=0.001 x1=0 x0=0 c1=0 c0=0 length=0.001 Switch=y
New "Line.CMT_295BF005263589" phases=1 bus1="MT4486153444969909BR03.1" bus2="MT2994913ID.1" r1=0.001 r0=0.001 x1=0 x0=0 c1=0 c0=0 length=0.001 Switch=y
New "Line.CMT_295CF005540199" phases=3 bus1="MT4445534345346732BR03.1.2.3" bus2="MT117844540ID.1.2.3" r1=0.001 r0=0.001 x1=0 x0=0 c1=0 c0=0 length=0.001 Switch=y
New "Line.CMT_295BF005759519" phases=3 bus1="MT445807564544531BR03.1.2.3" bus2="MT197062261ID.1.2.3" r1=0.001 r0=0.001 x1=0 x0=0 c1=0 c0=0 length=0.001 Switch=y
New "Line.CMT_295CF005292389" phases=3 bus1="MT446173345390614BR03.1.2.3" bus2="MT2996698ID.1.2.3" r1=0.001 r0=0.001 x1=0 x0=0 c1=0 c0=0 length=0.001 Switch=y
New "Line.CMT_295BF005954589" phases=3 bus1="MT451668745095505BR03.1.2.3" bus2="MT304527839ID.1.2.3" r1=0.001 r0=0.001 x1=0 x0=0 c1=0 c0=0 length=0.001 Switch=y
!New "Line.CMT_295FF000002389" phases=3 bus1="MT4419922645176391BR03.1.2.3" bus2="MT2992588ID.1.2.3" r1=0.001 r0=0.001 x1=0 x0=0 c1=0 c0=0 length=0.001 Switch=y
New "Line.CMT_295FF006041069" phases=3 bus1="MT4565336944656614BR03.1.2.3" bus2="MT313160549ID.1.2.3" r1=0.001 r0=0.001 x1=0 x0=0 c1=0 c0=0 length=0.001 Switch=y
New "Line.CMT_295BF005096079" phases=1 bus1="MT4560612744815142BR03.2" bus2="MT2982641ID.2" r1=0.001 r0=0.001 x1=0 x0=0 c1=0 c0=0 length=0.001 Switch=y
New "Line.CMT_295BR000007359" phases=3 bus1="MT457877544618297BR03.1.2.3" bus2="MT2986894ID.1.2.3" r1=0.001 r0=0.001 x1=0 x0=0 c1=0 c0=0 length=0.001 Switch=y
New "Line.CMT_295CF005398959" phases=3 bus1="MT4427716645227753BR03.1.2.3" bus2="MT2983046ID.1.2.3" r1=0.001 r0=0.001 x1=0 x0=0 c1=0 c0=0 length=0.001 Switch=y
New "Line.CMT_295BF005554039" phases=3 bus1="MT4549772844801317BR03.1.2.3" bus2="MT124473175ID.1.2.3" r1=0.001 r0=0.001 x1=0 x0=0 c1=0 c0=0 length=0.001 Switch=y
New "Line.CMT_295BR000001259" phases=2 bus1="MT4534144744870725BR03.3.1" bus2="MT2987702ID.3.1" r1=0.001 r0=0.001 x1=0 x0=0 c1=0 c0=0 length=0.001 Switch=y
New "Line.CMT_295RL005394819" phases=3 bus1="MT4427592445234511BR03.1.2.3" bus2="MT2999275ID.1.2.3" r1=0.001 r0=0.001 x1=0 x0=0 c1=0 c0=0 length=0.001 Switch=y
New "Line.CMT_295BF005518959" phases=3 bus1="MT4628689344644038BR03.1.2.3" bus2="MT83445302ID.1.2.3" r1=0.001 r0=0.001 x1=0 x0=0 c1=0 c0=0 length=0.001 Switch=y
New "Line.CMT_295BF000007419" phases=1 bus1="MT4637322344715844BR03.1" bus2="MT2996369ID.1" r1=0.001 r0=0.001 x1=0 x0=0 c1=0 c0=0 length=0.001 Switch=y
New "Line.CMT_295BF005188379" phases=1 bus1="MT449032945142844BR03.2" bus2="MT2986449ID.2" r1=0.001 r0=0.001 x1=0 x0=0 c1=0 c0=0 length=0.001 Switch=y
!New "Line.CMT_295CF000005139" phases=3 bus1="MT4429149545287064BRMT.1.2.3.4" bus2="MT2989777ID.1.2.3.4" r1=0.001 r0=0.001 x1=0 x0=0 c1=0 c0=0 length=0.001 Switch=y
New "Line.CMT_295BF005457229" phases=1 bus1="MT4489065445176984BR03.2" bus2="MT2997160ID.2" r1=0.001 r0=0.001 x1=0 x0=0 c1=0 c0=0 length=0.001 Switch=y
New "Line.CMT_295BR005267559" phases=3 bus1="MT4547172844764702BR03.1.2.3" bus2="MT2984741ID.1.2.3" r1=0.001 r0=0.001 x1=0 x0=0 c1=0 c0=0 length=0.001 Switch=y
New "Line.CMT_295BR005462219" phases=3 bus1="MT4479183345313383BR03.1.2.3" bus2="MT20559734ID.1.2.3" r1=0.001 r0=0.001 x1=0 x0=0 c1=0 c0=0 length=0.001 Switch=y
New "Line.CMT_295BF000004049" phases=3 bus1="MT449510984530719BR03.1.2.3" bus2="MT2982740ID.1.2.3" r1=0.001 r0=0.001 x1=0 x0=0 c1=0 c0=0 length=0.001 Switch=y
New "Line.CMT_295BF005214609" phases=1 bus1="MT456192944602318BR03.2" bus2="MT2986940ID.2" r1=0.001 r0=0.001 x1=0 x0=0 c1=0 c0=0 length=0.001 Switch=y
New "Line.CMT_295RL005400369" phases=3 bus1="MT4540340944820327BR03.1.2.3" bus2="MT2990815ID.1.2.3" r1=0.001 r0=0.001 x1=0 x0=0 c1=0 c0=0 length=0.001 Switch=y
!New "Line.CMT_295RL006061689" phases=3 bus1="MT4461102845470167BR03.1.2.3" bus2="MT316151608ID.1.2.3" r1=0.001 r0=0.001 x1=0 x0=0 c1=0 c0=0 length=0.001 Switch=y
New "Line.CMT_295BF005956529" phases=3 bus1="MT4490024945304499BR03.1.2.3" bus2="MT304302333ID.1.2.3" r1=0.001 r0=0.001 x1=0 x0=0 c1=0 c0=0 length=0.001 Switch=y
New "Line.CMT_295CF005522479" phases=3 bus1="MT4431640445238355BR03.1.2.3" bus2="MT92926454ID.1.2.3" r1=0.001 r0=0.001 x1=0 x0=0 c1=0 c0=0 length=0.001 Switch=y
!New "Line.CMT_295CF000002059" phases=3 bus1="MT4448932645398792BR03.1.2.3" bus2="MT2984877ID.1.2.3" r1=0.001 r0=0.001 x1=0 x0=0 c1=0 c0=0 length=0.001 Switch=y
New "Line.CMT_270BF000252099" phases=3 bus1="MT455277754505272BR03.1.2.3" bus2="MT2993341ID.1.2.3" r1=0.001 r0=0.001 x1=0 x0=0 c1=0 c0=0 length=0.001 Switch=y
!New "Line.CMT_295CF000005109" phases=3 bus1="MT4429122645311192BR03.1.2.3" bus2="MT2997133ID.1.2.3" r1=0.001 r0=0.001 x1=0 x0=0 c1=0 c0=0 length=0.001 Switch=y
New "Line.CMT_295BF005223129" phases=1 bus1="MT4510814645185617BR03.2" bus2="MT2997092ID.2" r1=0.001 r0=0.001 x1=0 x0=0 c1=0 c0=0 length=0.001 Switch=y
!New "Line.CMT_295CF005306109" phases=3 bus1="MT4438455945288986BR03.1.2.3" bus2="MT2991193ID.1.2.3" r1=0.001 r0=0.001 x1=0 x0=0 c1=0 c0=0 length=0.001 Switch=y
New "Line.CMT_295CF000005369" phases=3 bus1="MT442844445207644BR03.1.2.3" bus2="MT2994274ID.1.2.3" r1=0.001 r0=0.001 x1=0 x0=0 c1=0 c0=0 length=0.001 Switch=y
New "Line.CMT_295BF005408819" phases=1 bus1="MT458603834468107BR03.2" bus2="MT2999003ID.2" r1=0.001 r0=0.001 x1=0 x0=0 c1=0 c0=0 length=0.001 Switch=y
New "Line.CMT_295BR005436869" phases=3 bus1="MT4490796645304888BR03.1.2.3" bus2="MT2992547ID.1.2.3" r1=0.001 r0=0.001 x1=0 x0=0 c1=0 c0=0 length=0.001 Switch=y
New "Line.CMT_295CF005364479" phases=3 bus1="MT4479797345294623BR03.1.2.3" bus2="MT2986291ID.1.2.3" r1=0.001 r0=0.001 x1=0 x0=0 c1=0 c0=0 length=0.001 Switch=y
!New "Line.CMT_295FF000005809" phases=3 bus1="MT4437550545268354BR03.1.2.3" bus2="MT2994669ID.1.2.3" r1=0.001 r0=0.001 x1=0 x0=0 c1=0 c0=0 length=0.001 Switch=y
New "Line.CMT_295BF005462199" phases=3 bus1="MT4449660745377144BR03.1.2.3" bus2="MT23711509ID.1.2.3" r1=0.001 r0=0.001 x1=0 x0=0 c1=0 c0=0 length=0.001 Switch=y
New "Line.CMT_295BS005450129" phases=3 bus1="MT4510364145165565BR03.1.2.3" bus2="MT2993268ID.1.2.3" r1=0.001 r0=0.001 x1=0 x0=0 c1=0 c0=0 length=0.001 Switch=y
New "Line.CMT_295CF000209419" phases=3 bus1="MT4417112645120792BR03.1.2.3" bus2="MT2993274ID.1.2.3" r1=0.001 r0=0.001 x1=0 x0=0 c1=0 c0=0 length=0.001 Switch=y
!New "Line.CMT_295RL006080169" phases=3 bus1="MT4428156845297288BR03.1.2.3" bus2="MT317423613ID.1.2.3" r1=0.001 r0=0.001 x1=0 x0=0 c1=0 c0=0 length=0.001 Switch=y
New "Line.CMT_295CF005444049" phases=3 bus1="MT4429114545246878BR03.1.2.3" bus2="MT26859048ID.1.2.3" r1=0.001 r0=0.001 x1=0 x0=0 c1=0 c0=0 length=0.001 Switch=y
New "Line.CMT_295RL006136679" phases=1 bus1="MT4570876144623264BR03.2" bus2="MT316523402ID.2" r1=0.001 r0=0.001 x1=0 x0=0 c1=0 c0=0 length=0.001 Switch=y
New "Line.CMT_295BF000005149" phases=3 bus1="MT4428435545296062BR03.1.2.3" bus2="MT2993186ID.1.2.3" r1=0.001 r0=0.001 x1=0 x0=0 c1=0 c0=0 length=0.001 Switch=y
New "Line.CMT_295BF005494529" phases=3 bus1="MT4581272144661664BR03.1.2.3" bus2="MT44138026ID.1.2.3" r1=0.001 r0=0.001 x1=0 x0=0 c1=0 c0=0 length=0.001 Switch=y
New "Line.CMT_295BF000005029" phases=3 bus1="MT443904345269941BR03.1.2.3" bus2="MT2999277ID.1.2.3" r1=0.001 r0=0.001 x1=0 x0=0 c1=0 c0=0 length=0.001 Switch=y
New "Line.CMT_295CF000003339" phases=3 bus1="MT44385326452835BR03.1.2.3" bus2="MT2994880ID.1.2.3" r1=0.001 r0=0.001 x1=0 x0=0 c1=0 c0=0 length=0.001 Switch=y
New "Line.CMT_295BR000007369" phases=3 bus1="MT4585547744671723BR03.1.2.3" bus2="MT2998457ID.1.2.3" r1=0.001 r0=0.001 x1=0 x0=0 c1=0 c0=0 length=0.001 Switch=y
New "Line.CMT_295FF005450159" phases=3 bus1="MT4608563344673494BR03.1.2.3" bus2="MT2989521ID.1.2.3" r1=0.001 r0=0.001 x1=0 x0=0 c1=0 c0=0 length=0.001 Switch=y
New "Line.CMT_295BF000007449" phases=3 bus1="MT4648546944794278BR03.1.2.3" bus2="MT2983999ID.1.2.3" r1=0.001 r0=0.001 x1=0 x0=0 c1=0 c0=0 length=0.001 Switch=y
New "Line.CMT_295BF005536099" phases=3 bus1="MT448932954515883BR03.1.2.3" bus2="MT110836728ID.1.2.3" r1=0.001 r0=0.001 x1=0 x0=0 c1=0 c0=0 length=0.001 Switch=y
!New "Line.CMT_295RL005549329" phases=3 bus1="MT4449327745376757BR03.1.2.3" bus2="MT124132806ID.1.2.3" r1=0.001 r0=0.001 x1=0 x0=0 c1=0 c0=0 length=0.001 Switch=y
New "Line.CMT_295CF000208859" phases=3 bus1="MT4475853645321259BR03.1.2.3" bus2="MT2985982ID.1.2.3" r1=0.001 r0=0.001 x1=0 x0=0 c1=0 c0=0 length=0.001 Switch=y
New "Line.CMT_295BF005311079" phases=1 bus1="MT4527013544966331BR03.2" bus2="MT2989147ID.2" r1=0.001 r0=0.001 x1=0 x0=0 c1=0 c0=0 length=0.001 Switch=y
New "Line.CMT_295CF000208639" phases=3 bus1="MT442259445191749BR03.1.2.3" bus2="MT2996263ID.1.2.3" r1=0.001 r0=0.001 x1=0 x0=0 c1=0 c0=0 length=0.001 Switch=y
New "Line.CMT_295BF005310929" phases=3 bus1="MT4464475145398898BR03.1.2.3" bus2="MT2981434ID.1.2.3" r1=0.001 r0=0.001 x1=0 x0=0 c1=0 c0=0 length=0.001 Switch=y
New "Line.CMT_295BF000002809" phases=3 bus1="MT4451456145381141BR03.1.2.3" bus2="MT2995631ID.1.2.3" r1=0.001 r0=0.001 x1=0 x0=0 c1=0 c0=0 length=0.001 Switch=y
New "Line.CMT_295FF000208599" phases=3 bus1="MT4551231444772962BR03.1.2.3" bus2="MT2995169ID.1.2.3" r1=0.001 r0=0.001 x1=0 x0=0 c1=0 c0=0 length=0.001 Switch=y
New "Line.CMT_295BF005311089" phases=1 bus1="MT4535247144883139BR03.2" bus2="MT2986412ID.2" r1=0.001 r0=0.001 x1=0 x0=0 c1=0 c0=0 length=0.001 Switch=y
New "Line.CMT_295CF000002009" phases=3 bus1="MT4451796545368971BR03.1.2.3" bus2="MT2981937ID.1.2.3" r1=0.001 r0=0.001 x1=0 x0=0 c1=0 c0=0 length=0.001 Switch=y
!New "Line.CMT_295CF000005349" phases=3 bus1="MT4421192645188091BR03.1.2.3" bus2="MT2990914ID.1.2.3" r1=0.001 r0=0.001 x1=0 x0=0 c1=0 c0=0 length=0.001 Switch=y
New "Line.CMT_295BR005450109" phases=3 bus1="MT4487842645296504BR03.1.2.3" bus2="MT2994034ID.1.2.3" r1=0.001 r0=0.001 x1=0 x0=0 c1=0 c0=0 length=0.001 Switch=y
New "Line.CMT_295RL005096269" phases=3 bus1="MT448044345299913BR03.1.2.3" bus2="MT2990627ID.1.2.3" r1=0.001 r0=0.001 x1=0 x0=0 c1=0 c0=0 length=0.001 Switch=y
!New "Line.CMT_295FF000001869" phases=3 bus1="MT4447070445354755BR03.1.2.3" bus2="MT2992179ID.1.2.3" r1=0.001 r0=0.001 x1=0 x0=0 c1=0 c0=0 length=0.001 Switch=y
New "Line.CMT_270BF000258259" phases=2 bus1="MT4496704345661785BR03.3.1" bus2="MT2991565ID.3.1" r1=0.001 r0=0.001 x1=0 x0=0 c1=0 c0=0 length=0.001 Switch=y
New "Line.CMT_295BF005427239" phases=3 bus1="MT448899034519024BR03.1.2.3" bus2="MT2994509ID.1.2.3" r1=0.001 r0=0.001 x1=0 x0=0 c1=0 c0=0 length=0.001 Switch=y
New "Line.CMT_295BF000004239" phases=3 bus1="MT4427222645245792BR03.1.2.3" bus2="MT2996311ID.1.2.3" r1=0.001 r0=0.001 x1=0 x0=0 c1=0 c0=0 length=0.001 Switch=y
New "Line.CMT_270BF005965059" phases=3 bus1="MT454570194532612BR03.1.2.3" bus2="MT305595199ID.1.2.3" r1=0.001 r0=0.001 x1=0 x0=0 c1=0 c0=0 length=0.001 Switch=y
New "Line.CMT_295FF000006239" phases=3 bus1="MT4453511945407492BR03.1.2.3" bus2="MT2981569ID.1.2.3" r1=0.001 r0=0.001 x1=0 x0=0 c1=0 c0=0 length=0.001 Switch=y
New "Line.CMT_295BF005306479" phases=1 bus1="MT4658312744810709BR03.1" bus2="MT2995544ID.1" r1=0.001 r0=0.001 x1=0 x0=0 c1=0 c0=0 length=0.001 Switch=y
New "Line.CMT_270BF000258469" phases=3 bus1="MT4526332645194492BR03.1.2.3" bus2="MT2992079ID.1.2.3" r1=0.001 r0=0.001 x1=0 x0=0 c1=0 c0=0 length=0.001 Switch=y
New "Line.CMT_295BF005410219" phases=1 bus1="MT4531499944903703BR03.2" bus2="MT2994992ID.2" r1=0.001 r0=0.001 x1=0 x0=0 c1=0 c0=0 length=0.001 Switch=y
New "Line.CMT_295BF005516189" phases=1 bus1="MT4489024845187228BR03.1" bus2="MT78335443ID.1" r1=0.001 r0=0.001 x1=0 x0=0 c1=0 c0=0 length=0.001 Switch=y
New "Line.CMT_295BF006014069" phases=1 bus1="MT4562345544635155BR03.3" bus2="MT309752851ID.3" r1=0.001 r0=0.001 x1=0 x0=0 c1=0 c0=0 length=0.001 Switch=y
New "Line.CMT_295BF005519059" phases=3 bus1="MT4427252945250339BR03.1.2.3" bus2="MT83518326ID.1.2.3" r1=0.001 r0=0.001 x1=0 x0=0 c1=0 c0=0 length=0.001 Switch=y
New "Line.CMT_295BR000007659" phases=3 bus1="MT4673906444751738BR03.1.2.3" bus2="MT2993676ID.1.2.3" r1=0.001 r0=0.001 x1=0 x0=0 c1=0 c0=0 length=0.001 Switch=y
New "Line.CMT_295BR000007379" phases=3 bus1="MT4617338744657197BR03.1.2.3" bus2="MT2998335ID.1.2.3" r1=0.001 r0=0.001 x1=0 x0=0 c1=0 c0=0 length=0.001 Switch=y
New "Line.CMT_295BF000001519" phases=1 bus1="MT4533541644840515BR03.3" bus2="MT2991543ID.3" r1=0.001 r0=0.001 x1=0 x0=0 c1=0 c0=0 length=0.001 Switch=y
New "Line.CMT_295BF006166729" phases=3 bus1="MT4508364345103171BR03.1.2.3" bus2="MT321320910ID.1.2.3" r1=0.001 r0=0.001 x1=0 x0=0 c1=0 c0=0 length=0.001 Switch=y
!New "Line.CMT_295CF000209409" phases=3 bus1="MT441722245119224BR03.1.2.3" bus2="MT2986645ID.1.2.3" r1=0.001 r0=0.001 x1=0 x0=0 c1=0 c0=0 length=0.001 Switch=y
New "Line.CMT_295BF005964469" phases=3 bus1="MT4619298144707445BR03.1.2.3" bus2="MT305597752ID.1.2.3" r1=0.001 r0=0.001 x1=0 x0=0 c1=0 c0=0 length=0.001 Switch=y
New "Line.CMT_295BF000007399" phases=3 bus1="MT4616973944666239BR03.1.2.3" bus2="MT2982639ID.1.2.3" r1=0.001 r0=0.001 x1=0 x0=0 c1=0 c0=0 length=0.001 Switch=y
New "Line.CMT_295CF000208319" phases=3 bus1="MT4434742645263092BR03.1.2.3" bus2="MT2991465ID.1.2.3" r1=0.001 r0=0.001 x1=0 x0=0 c1=0 c0=0 length=0.001 Switch=y
New "Line.CMT_295BF000210509" phases=3 bus1="MT4518511345075546BR03.1.2.3" bus2="MT2986666ID.1.2.3" r1=0.001 r0=0.001 x1=0 x0=0 c1=0 c0=0 length=0.001 Switch=y
New "Line.CMT_295BF005115139" phases=3 bus1="MT4665944944825713BR03.1.2.3" bus2="MT2993220ID.1.2.3" r1=0.001 r0=0.001 x1=0 x0=0 c1=0 c0=0 length=0.001 Switch=y
New "Line.CMT_295BF006029539" phases=3 bus1="MT44361712452693BR03.1.2.3" bus2="MT311423435ID.1.2.3" r1=0.001 r0=0.001 x1=0 x0=0 c1=0 c0=0 length=0.001 Switch=y
New "Line.CMT_295BR005070769" phases=3 bus1="MT4674891444773946BR03.1.2.3" bus2="MT2994510ID.1.2.3" r1=0.001 r0=0.001 x1=0 x0=0 c1=0 c0=0 length=0.001 Switch=y
New "Line.CMT_270BF000247719" phases=3 bus1="MT450038514557639BR03.1.2.3" bus2="MT2994285ID.1.2.3" r1=0.001 r0=0.001 x1=0 x0=0 c1=0 c0=0 length=0.001 Switch=y
New "Line.CMT_295BF005350229" phases=1 bus1="MT4506373845091115BR03.2" bus2="MT2995811ID.2" r1=0.001 r0=0.001 x1=0 x0=0 c1=0 c0=0 length=0.001 Switch=y
New "Line.CMT_270BF006112569" phases=1 bus1="MT453965945135656BR03.2" bus2="MT316068707ID.2" r1=0.001 r0=0.001 x1=0 x0=0 c1=0 c0=0 length=0.001 Switch=y
New "Line.CMT_295BF006213189" phases=1 bus1="MT4560478944811711BR03.2" bus2="MT323848803ID.2" r1=0.001 r0=0.001 x1=0 x0=0 c1=0 c0=0 length=0.001 Switch=y
New "Line.CMT_295CF000005169" phases=3 bus1="MT442746244524191BR03.1.2.3" bus2="MT2982685ID.1.2.3" r1=0.001 r0=0.001 x1=0 x0=0 c1=0 c0=0 length=0.001 Switch=y
New "Line.CMT_270BF005176899" phases=1 bus1="MT4547060745093201BR03.2" bus2="MT2984751ID.2" r1=0.001 r0=0.001 x1=0 x0=0 c1=0 c0=0 length=0.001 Switch=y
New "Line.CMT_295CF000003949" phases=3 bus1="MT4438695945288482BR03.1.2.3" bus2="MT2987100ID.1.2.3" r1=0.001 r0=0.001 x1=0 x0=0 c1=0 c0=0 length=0.001 Switch=y
New "Line.CMT_295BR000007509" phases=3 bus1="MT4510462945150119BR03.1.2.3" bus2="MT2998533ID.1.2.3" r1=0.001 r0=0.001 x1=0 x0=0 c1=0 c0=0 length=0.001 Switch=y
New "Line.CMT_295BF005311109" phases=2 bus1="MT453324144880227BR03.3.1" bus2="MT2997262ID.3.1" r1=0.001 r0=0.001 x1=0 x0=0 c1=0 c0=0 length=0.001 Switch=y
New "Line.CMT_295BF005526479" phases=3 bus1="MT4448452645358995BR03.1.2.3" bus2="MT95867844ID.1.2.3" r1=0.001 r0=0.001 x1=0 x0=0 c1=0 c0=0 length=0.001 Switch=y
New "Line.CMT_295BR000004059" phases=3 bus1="MT4503516345232036BR03.1.2.3" bus2="MT2989162ID.1.2.3" r1=0.001 r0=0.001 x1=0 x0=0 c1=0 c0=0 length=0.001 Switch=y
New "Line.CMT_295CF000005359" phases=3 bus1="MT4427972545209503BR03.1.2.3" bus2="MT2991925ID.1.2.3" r1=0.001 r0=0.001 x1=0 x0=0 c1=0 c0=0 length=0.001 Switch=y
New "Line.CMT_295RL005548839" phases=3 bus1="MT4449207645375581BR03.1.2.3" bus2="MT124141890ID.1.2.3" r1=0.001 r0=0.001 x1=0 x0=0 c1=0 c0=0 length=0.001 Switch=y
New "Line.CMT_295RL006061688_A" phases=3 bus1="MT4461102845470167BR03.1.2.3" bus2="MT298515533ID.1.2.3" r1=0.001 r0=0.001 x1=0 x0=0 c1=0 c0=0 length=0.001 Switch=y
New "Line.CMT_295RL005549328_A" phases=3 bus1="MT4449327745376757BR03.1.2.3" bus2="MT199555699ID.1.2.3" r1=0.001 r0=0.001 x1=0 x0=0 c1=0 c0=0 length=0.001 Switch=y
New "Line.CMT_295RL005394818_A" phases=3 bus1="MT4427592445234511BR03.1.2.3" bus2="MT202879174ID.1.2.3" r1=0.001 r0=0.001 x1=0 x0=0 c1=0 c0=0 length=0.001 Switch=y
New "Line.CMT_295RL005400368_A" phases=3 bus1="MT4540340944820327BR03.1.2.3" bus2="MT202878841ID.1.2.3" r1=0.001 r0=0.001 x1=0 x0=0 c1=0 c0=0 length=0.001 Switch=y
New "Line.CMT_295RL006080168_A" phases=3 bus1="MT4428156845297288BR03.1.2.3" bus2="MT301680868ID.1.2.3" r1=0.001 r0=0.001 x1=0 x0=0 c1=0 c0=0 length=0.001 Switch=y
New "Line.CMT_295BR000007389" phases=3 bus1="MT4606758444718881BR03.1.2.3" bus2="MT2992542ID.1.2.3" r1=0.001 r0=0.001 x1=0 x0=0 c1=0 c0=0 length=0.001 Switch=y
New "Line.CMT_295RT000020178_A" phases=3 bus1="MT4476133645319384BR03.1.2.3" bus2="MT202879362ID.1.2.3" r1=0.001 r0=0.001 x1=0 x0=0 c1=0 c0=0 length=0.001 Switch=y
New "Line.CMT_295RL005548838_A" phases=3 bus1="MT4449207645375581BR03.1.2.3" bus2="MT199555707ID.1.2.3" r1=0.001 r0=0.001 x1=0 x0=0 c1=0 c0=0 length=0.001 Switch=y
New "Line.CMT_295RL005096268_A" phases=3 bus1="MT448044345299913BR03.1.2.3" bus2="MT202878832ID.1.2.3" r1=0.001 r0=0.001 x1=0 x0=0 c1=0 c0=0 length=0.001 Switch=y
New "Line.CMT_295BC000020108_A" phases=3 bus1="MT443501845263981BR03.1.2.3" bus2="MT199555363ID.1.2.3" r1=0.001 r0=0.001 x1=0 x0=0 c1=0 c0=0 length=0.001 Switch=y
New "Line.CMT_295BF000006959" phases=3 bus1="MT4541296944725182BR03.1.2.3" bus2="MT2982833ID.1.2.3" r1=0.001 r0=0.001 x1=0 x0=0 c1=0 c0=0 length=0.001 Switch=y
New "Line.CMT_295BF000005159" phases=3 bus1="MT4430924145297545BR03.1.2.3" bus2="MT2982457ID.1.2.3" r1=0.001 r0=0.001 x1=0 x0=0 c1=0 c0=0 length=0.001 Switch=y
New "Line.CMT_295BF000209579" phases=3 bus1="MT442380245155824BR03.1.2.3" bus2="MT2989003ID.1.2.3" r1=0.001 r0=0.001 x1=0 x0=0 c1=0 c0=0 length=0.001 Switch=y
New "Line.CMT_295BF005424659" phases=3 bus1="MT4488974645192314BR03.1.2.3" bus2="MT2994934ID.1.2.3" r1=0.001 r0=0.001 x1=0 x0=0 c1=0 c0=0 length=0.001 Switch=y
New "Line.CMT_295BF005310919" phases=3 bus1="MT4452966745377271BR03.1.2.3" bus2="MT2998940ID.1.2.3" r1=0.001 r0=0.001 x1=0 x0=0 c1=0 c0=0 length=0.001 Switch=y
New "Line.CMT_295BF005331209" phases=1 bus1="MT4490669445134528BR03.1" bus2="MT2991681ID.1" r1=0.001 r0=0.001 x1=0 x0=0 c1=0 c0=0 length=0.001 Switch=y
New "Line.CMT_295BR000004029" phases=3 bus1="MT4487869445025643BR03.1.2.3" bus2="MT2997492ID.1.2.3" r1=0.001 r0=0.001 x1=0 x0=0 c1=0 c0=0 length=0.001 Switch=y
