! DU_1_GeradoresBT_391_BRR_RBRR1303
New XYCurve.MyPvsT npts=4 xarray=[0  25  75  100]  yarray=[1.2  1.0  0.8  0.6]
New XYCurve.MyEff npts=4 xarray=[0.1  0.2  0.4  1.0]  yarray=[0.86  0.9  0.93  0.97]
New Tshape.MyTemp npts=24 interval=1 temp=[18.65, 18.27, 17.93, 17.62, 17.47, 17.27, 18.42, 23.9, 30.18, 36.35, 40.97, 44.87, 46.76, 46.16, 42.51, 37.29, 31.48, 26.62, 23.06, 21.24, 20.47, 19.93, 19.49, 19.07]
New Loadshape.PVIrrad_RBRR1303 24 1.0 mult=[0.0, 0.0, 0.0, 0.0, 0.0, 0.0, 0.052772, 0.233339, 0.440911, 0.654815, 0.810302, 0.943304, 1.0, 0.957835, 0.798472, 0.587852, 0.346976, 0.16351, 0.040852, 0.0, 0.0, 0.0, 0.0, 0.0]

New PVsystem.BT_4544145e6775c86196d5ab8a98707870b89e1dc5756d2ecfaea689130e71d563_M1 phases=1 bus1=BT4540621445179933BR03.1.2.4 conn=Delta kv=0.24 pf=1.0 pmpp=2.945 kva=2.560 %pmpp=100 irradiance=0.8 temperature=25 %cutin=0.1 %cutout=0.1 effcurve=Myeff P-TCurve=MyPvsT Daily=PVIrrad_RBRR1303 TDaily=MyTemp
!New PVsystem.BT_b601b6c2441af42e0ce08ad9e9882329c05095d4b9d3879f0881b9e5333611a9_M1 phases=1 bus1=BT4429242745279308BR03.1.2.4 conn=Delta kv=0.22 pf=1.0 pmpp=0.000 kva=0.000 %pmpp=100 irradiance=0.8 temperature=25 %cutin=0.1 %cutout=0.1 effcurve=Myeff P-TCurve=MyPvsT Daily=PVIrrad_RBRR1303 TDaily=MyTemp
New PVsystem.BT_ec2f9a944786d00aafc987a612bcaa2b62d96b2bef3b21d8f4da4576d4977bec_M1 phases=3 bus1=BT4422046445190881BR03.1.2.3.4 conn=Wye kv=0.22 pf=1.0 pmpp=0.916 kva=0.797 %pmpp=100 irradiance=0.8 temperature=25 %cutin=0.1 %cutout=0.1 effcurve=Myeff P-TCurve=MyPvsT Daily=PVIrrad_RBRR1303 TDaily=MyTemp
New PVsystem.BT_85a88064d9e0e2767e6540de7b372533809a131354a0587adf3e3b29a6005601_M1 phases=1 bus1=BT4429045445217993BR03.1.2.4 conn=Delta kv=0.22 pf=1.0 pmpp=0.401 kva=0.349 %pmpp=100 irradiance=0.8 temperature=25 %cutin=0.1 %cutout=0.1 effcurve=Myeff P-TCurve=MyPvsT Daily=PVIrrad_RBRR1303 TDaily=MyTemp
!New PVsystem.BT_6e733a3ad2d18a52ea5ab1a2f082d88ce2715a3931c3da0748d7b079fe704cfc_M1 phases=1 bus1=BT4440414145269391BR03.2.3.4 conn=Delta kv=0.22 pf=1.0 pmpp=0.000 kva=0.000 %pmpp=100 irradiance=0.8 temperature=25 %cutin=0.1 %cutout=0.1 effcurve=Myeff P-TCurve=MyPvsT Daily=PVIrrad_RBRR1303 TDaily=MyTemp
!New PVsystem.BT_fec4dbf22c80a09ce18d5d56d30a35b953e1d02a93e9793cf063483400059ca7_M1 phases=3 bus1=BT4533731344876371BR03.1.2.3.4 conn=Wye kv=0.22 pf=1.0 pmpp=0.000 kva=0.000 %pmpp=100 irradiance=0.8 temperature=25 %cutin=0.1 %cutout=0.1 effcurve=Myeff P-TCurve=MyPvsT Daily=PVIrrad_RBRR1303 TDaily=MyTemp
New PVsystem.BT_eb06d4acc5888f7dc8b2f02f4dd5f0a2c28ca9f3e7e4117ef1298c21f9d7b271_M1 phases=3 bus1=BT4516142445069526BR03.1.2.3.4 conn=Wye kv=0.22 pf=1.0 pmpp=0.668 kva=0.581 %pmpp=100 irradiance=0.8 temperature=25 %cutin=0.1 %cutout=0.1 effcurve=Myeff P-TCurve=MyPvsT Daily=PVIrrad_RBRR1303 TDaily=MyTemp
!New PVsystem.BT_65fc308989bc0c95893f88f48bdaf047235fdd269f3ba5a76849fe38d8202a8b_M1 phases=3 bus1=BT4509376245127903BR03.1.2.3.4 conn=Wye kv=0.22 pf=1.0 pmpp=0.000 kva=0.000 %pmpp=100 irradiance=0.8 temperature=25 %cutin=0.1 %cutout=0.1 effcurve=Myeff P-TCurve=MyPvsT Daily=PVIrrad_RBRR1303 TDaily=MyTemp
New PVsystem.BT_24b79006d2bd3a3996d238b76bab042489734da205178b262995d860f1ecd7f1_M1 phases=1 bus1=BT450965944970321BR03.1.2.4 conn=Delta kv=0.22 pf=1.0 pmpp=0.736 kva=0.640 %pmpp=100 irradiance=0.8 temperature=25 %cutin=0.1 %cutout=0.1 effcurve=Myeff P-TCurve=MyPvsT Daily=PVIrrad_RBRR1303 TDaily=MyTemp
New PVsystem.BT_c4930b9ba2b9a4473b1eacaed32982377b2e4b7c761d5619c1e1f95e43e5a60f_M1 phases=3 bus1=BT442859814529783BR03.1.2.3.4 conn=Wye kv=0.22 pf=1.0 pmpp=4.975 kva=4.326 %pmpp=100 irradiance=0.8 temperature=25 %cutin=0.1 %cutout=0.1 effcurve=Myeff P-TCurve=MyPvsT Daily=PVIrrad_RBRR1303 TDaily=MyTemp
New PVsystem.BT_ffbe8e69dc347ea2003e0de0d694a3e0c6005935fcc4db1fd5107f28a43290c7_M1 phases=3 bus1=BT4427392945254715BR03.1.2.3.4 conn=Wye kv=0.22 pf=1.0 pmpp=0.772 kva=0.671 %pmpp=100 irradiance=0.8 temperature=25 %cutin=0.1 %cutout=0.1 effcurve=Myeff P-TCurve=MyPvsT Daily=PVIrrad_RBRR1303 TDaily=MyTemp
!New PVsystem.BT_a52112a0f93c9446ee8faac166b495c20e306396ff038fccf80fbf8a56533d66_M1 phases=1 bus1=BT4419900945130971BR03.3.1.4 conn=Delta kv=0.22 pf=1.0 pmpp=0.000 kva=0.000 %pmpp=100 irradiance=0.8 temperature=25 %cutin=0.1 %cutout=0.1 effcurve=Myeff P-TCurve=MyPvsT Daily=PVIrrad_RBRR1303 TDaily=MyTemp
New PVsystem.BT_8871cb7f70c04d48fdce27137f456659f3e1234a6b12006cc8e95ae2683dd0ae_M1 phases=1 bus1=BT4424241445160358BR03.3.1.4 conn=Delta kv=0.22 pf=1.0 pmpp=0.820 kva=0.713 %pmpp=100 irradiance=0.8 temperature=25 %cutin=0.1 %cutout=0.1 effcurve=Myeff P-TCurve=MyPvsT Daily=PVIrrad_RBRR1303 TDaily=MyTemp
New PVsystem.BT_acef41caea76e728e6b693147bd74833f9b203a6626078a3b7e8fb10266c01d3_M1 phases=1 bus1=BT444846845355499BR03.1.4 conn=Wye kv=0.127 pf=1.0 pmpp=0.558 kva=0.486 %pmpp=100 irradiance=0.8 temperature=25 %cutin=0.1 %cutout=0.1 effcurve=Myeff P-TCurve=MyPvsT Daily=PVIrrad_RBRR1303 TDaily=MyTemp
!New PVsystem.BT_a05dd085b98945360357cee2f35c9b0ffb7d17efa3261005121a5a6e69094f5d_M1 phases=1 bus1=BT4453365745373943BR03.1.2.4 conn=Delta kv=0.22 pf=1.0 pmpp=0.000 kva=0.000 %pmpp=100 irradiance=0.8 temperature=25 %cutin=0.1 %cutout=0.1 effcurve=Myeff P-TCurve=MyPvsT Daily=PVIrrad_RBRR1303 TDaily=MyTemp
!New PVsystem.BT_97cb51d7d206540e3f99ec801d25de427e876b57802098e24273afa416f73bb2_M1 phases=1 bus1=BT4453365745373943BR03.1.2.4 conn=Delta kv=0.22 pf=1.0 pmpp=0.000 kva=0.000 %pmpp=100 irradiance=0.8 temperature=25 %cutin=0.1 %cutout=0.1 effcurve=Myeff P-TCurve=MyPvsT Daily=PVIrrad_RBRR1303 TDaily=MyTemp
New PVsystem.BT_80e3a983d02520bf52ec8041a3a8192e81275f44442f11cf8b9f7599031edee2_M1 phases=3 bus1=BT4456620945406674BR03.1.2.3.4 conn=Wye kv=0.22 pf=1.0 pmpp=1.640 kva=1.426 %pmpp=100 irradiance=0.8 temperature=25 %cutin=0.1 %cutout=0.1 effcurve=Myeff P-TCurve=MyPvsT Daily=PVIrrad_RBRR1303 TDaily=MyTemp
!New PVsystem.BT_4844f901ee32864880d487d35094a229718ec730129f0f09053d0c4e7dcbf6af_M1 phases=3 bus1=BT4489052545163509BR03.1.2.3.4 conn=Wye kv=0.22 pf=1.0 pmpp=0.000 kva=0.000 %pmpp=100 irradiance=0.8 temperature=25 %cutin=0.1 %cutout=0.1 effcurve=Myeff P-TCurve=MyPvsT Daily=PVIrrad_RBRR1303 TDaily=MyTemp
!New PVsystem.BT_a825a95c37b7b54f7bf3b4999107bf1766c5485ea5616441e8f5b386e58cef64_M1 phases=3 bus1=BT4489052545163509BR03.1.2.3.4 conn=Wye kv=0.22 pf=1.0 pmpp=0.000 kva=0.000 %pmpp=100 irradiance=0.8 temperature=25 %cutin=0.1 %cutout=0.1 effcurve=Myeff P-TCurve=MyPvsT Daily=PVIrrad_RBRR1303 TDaily=MyTemp
New PVsystem.BT_192375e5a47fac759bae78e0355a62edc85448dbaa9fd0a08708df978f18ae77_M1 phases=3 bus1=BT4503126245236845BR03.1.2.3.4 conn=Wye kv=0.22 pf=1.0 pmpp=7.818 kva=6.798 %pmpp=100 irradiance=0.8 temperature=25 %cutin=0.1 %cutout=0.1 effcurve=Myeff P-TCurve=MyPvsT Daily=PVIrrad_RBRR1303 TDaily=MyTemp
New PVsystem.BT_43518f680c94893e67a163a2c46282e9879c0c01347cff5f92c44be343413b3d_M1 phases=3 bus1=BT4503126245236845BR03.1.2.3.4 conn=Wye kv=0.22 pf=1.0 pmpp=0.652 kva=0.567 %pmpp=100 irradiance=0.8 temperature=25 %cutin=0.1 %cutout=0.1 effcurve=Myeff P-TCurve=MyPvsT Daily=PVIrrad_RBRR1303 TDaily=MyTemp
!New PVsystem.BT_b618dc4c251b03b89630ac2995d96eb1e759752dd1c33836ece18e722b11e8ed_M1 phases=3 bus1=BT4450663545378292BR03.1.2.3.4 conn=Wye kv=0.22 pf=1.0 pmpp=0.000 kva=0.000 %pmpp=100 irradiance=0.8 temperature=25 %cutin=0.1 %cutout=0.1 effcurve=Myeff P-TCurve=MyPvsT Daily=PVIrrad_RBRR1303 TDaily=MyTemp
New PVsystem.BT_7107edce6740e60901eeee74ba227fd84cc69f825a9da5200680631fce8a1f7a_M1 phases=3 bus1=BT4488572445243319BR03.1.2.3.4 conn=Wye kv=0.22 pf=1.0 pmpp=0.576 kva=0.501 %pmpp=100 irradiance=0.8 temperature=25 %cutin=0.1 %cutout=0.1 effcurve=Myeff P-TCurve=MyPvsT Daily=PVIrrad_RBRR1303 TDaily=MyTemp
!New PVsystem.BT_fcbbd34a0f1e40d67f2a53015c0f58405ba1cbd6ca3efd98240dd3a2715ba6d5_M1 phases=3 bus1=BT4488572445243319BR03.1.2.3.4 conn=Wye kv=0.22 pf=1.0 pmpp=0.000 kva=0.000 %pmpp=100 irradiance=0.8 temperature=25 %cutin=0.1 %cutout=0.1 effcurve=Myeff P-TCurve=MyPvsT Daily=PVIrrad_RBRR1303 TDaily=MyTemp
!New PVsystem.BT_1fc6f6b4b88efb6af57e664ff906f5ea2165a1a657f310e6c84c04d424b5bc95_M1 phases=1 bus1=BT449136945148193BR03.1.2.4 conn=Delta kv=0.24 pf=1.0 pmpp=0.000 kva=0.000 %pmpp=100 irradiance=0.8 temperature=25 %cutin=0.1 %cutout=0.1 effcurve=Myeff P-TCurve=MyPvsT Daily=PVIrrad_RBRR1303 TDaily=MyTemp
!New PVsystem.BT_1a55820581616aaf16a19992ad54208fb7422fdef20b86ef601ced286200a90f_M1 phases=1 bus1=BT44889224519106BR03.1.2.4 conn=Delta kv=0.24 pf=1.0 pmpp=0.000 kva=0.000 %pmpp=100 irradiance=0.8 temperature=25 %cutin=0.1 %cutout=0.1 effcurve=Myeff P-TCurve=MyPvsT Daily=PVIrrad_RBRR1303 TDaily=MyTemp
!New PVsystem.BT_abe234fd048a970f7efbbefbf64ced1e2ae957946d85578674c9a5f03f65ed71_M1 phases=1 bus1=BT44889224519106BR03.1.2.4 conn=Delta kv=0.24 pf=1.0 pmpp=0.000 kva=0.000 %pmpp=100 irradiance=0.8 temperature=25 %cutin=0.1 %cutout=0.1 effcurve=Myeff P-TCurve=MyPvsT Daily=PVIrrad_RBRR1303 TDaily=MyTemp
New PVsystem.BT_ff9048e9930668eaa47b2428bad14ae7c8b91ea9df35a06b758645a7cf422ff4_M1 phases=1 bus1=BT449549064515439BR03.1.2.4 conn=Delta kv=0.24 pf=1.0 pmpp=1.267 kva=1.101 %pmpp=100 irradiance=0.8 temperature=25 %cutin=0.1 %cutout=0.1 effcurve=Myeff P-TCurve=MyPvsT Daily=PVIrrad_RBRR1303 TDaily=MyTemp
!New PVsystem.BT_06e94dcf5bb1bc0ab2a02b59ae7a627d42b1cd358b5496434f5fb18f88b40750_M1 phases=1 bus1=BT4490211745176856BR03.1.2.4 conn=Delta kv=0.24 pf=1.0 pmpp=0.000 kva=0.000 %pmpp=100 irradiance=0.8 temperature=25 %cutin=0.1 %cutout=0.1 effcurve=Myeff P-TCurve=MyPvsT Daily=PVIrrad_RBRR1303 TDaily=MyTemp
New PVsystem.BT_9484517f54d29c029647e1a1fbd2a4626a377ccb3a64ac85157b5e2caab72824_M1 phases=1 bus1=BT4502946945122732BR03.1.2.4 conn=Delta kv=0.24 pf=1.0 pmpp=0.272 kva=0.236 %pmpp=100 irradiance=0.8 temperature=25 %cutin=0.1 %cutout=0.1 effcurve=Myeff P-TCurve=MyPvsT Daily=PVIrrad_RBRR1303 TDaily=MyTemp
New PVsystem.BT_ffa1e4619dae4fa4236a4086b1f82f18a64c876960cbc111c6aefd9f74cbb46f_M1 phases=1 bus1=BT4454342545401712BR03.1.2.4 conn=Delta kv=0.22 pf=1.0 pmpp=0.541 kva=0.470 %pmpp=100 irradiance=0.8 temperature=25 %cutin=0.1 %cutout=0.1 effcurve=Myeff P-TCurve=MyPvsT Daily=PVIrrad_RBRR1303 TDaily=MyTemp
New PVsystem.BT_47b55104dff94c920be20e2af159f1455504e42a5a212d78bba06f0f6a9ffe52_M1 phases=1 bus1=BT4455012645397898BR03.1.2.4 conn=Delta kv=0.22 pf=1.0 pmpp=0.873 kva=0.759 %pmpp=100 irradiance=0.8 temperature=25 %cutin=0.1 %cutout=0.1 effcurve=Myeff P-TCurve=MyPvsT Daily=PVIrrad_RBRR1303 TDaily=MyTemp
New PVsystem.BT_2d09dce863d17ad29d98f95645047d2b351c780a27ca1a34c74a66e688f9dc43_M1 phases=3 bus1=BT4455012645397898BR03.1.2.3.4 conn=Wye kv=0.22 pf=1.0 pmpp=0.769 kva=0.669 %pmpp=100 irradiance=0.8 temperature=25 %cutin=0.1 %cutout=0.1 effcurve=Myeff P-TCurve=MyPvsT Daily=PVIrrad_RBRR1303 TDaily=MyTemp
!New PVsystem.BT_9c2a85470b7ff724456aa078bb9c4e4a178ae13e155f1b6e2120b807167bec24_M1 phases=1 bus1=BT4455012645397898BR03.1.4 conn=Wye kv=0.127 pf=1.0 pmpp=0.000 kva=0.000 %pmpp=100 irradiance=0.8 temperature=25 %cutin=0.1 %cutout=0.1 effcurve=Myeff P-TCurve=MyPvsT Daily=PVIrrad_RBRR1303 TDaily=MyTemp
New PVsystem.BT_5c3c11e02ad187ac55e943bb14f170388bf6c09bb5bdbb4a779867b49762b0cc_M1 phases=1 bus1=BT4490842145199033BR03.3.1.4 conn=Delta kv=0.22 pf=1.0 pmpp=0.896 kva=0.779 %pmpp=100 irradiance=0.8 temperature=25 %cutin=0.1 %cutout=0.1 effcurve=Myeff P-TCurve=MyPvsT Daily=PVIrrad_RBRR1303 TDaily=MyTemp
New PVsystem.BT_d50636075fa049d79078ed3dce8391c4eb508b991c75444d28ba49a0f9b8b09b_M1 phases=1 bus1=BT4494912445175844BR03.1.2.4 conn=Delta kv=0.24 pf=1.0 pmpp=0.909 kva=0.790 %pmpp=100 irradiance=0.8 temperature=25 %cutin=0.1 %cutout=0.1 effcurve=Myeff P-TCurve=MyPvsT Daily=PVIrrad_RBRR1303 TDaily=MyTemp
New PVsystem.BT_7715816e02beed11800514da243eb9f5ce14d4f36b287619a3e0f18c13f8c303_M1 phases=3 bus1=BT4491085745224815BR03.1.2.3.4 conn=Wye kv=0.22 pf=1.0 pmpp=2.556 kva=2.223 %pmpp=100 irradiance=0.8 temperature=25 %cutin=0.1 %cutout=0.1 effcurve=Myeff P-TCurve=MyPvsT Daily=PVIrrad_RBRR1303 TDaily=MyTemp
New PVsystem.BT_ce806647d26ee8ba2ed8087c57c69e7245e6f294118f487bd21316f311d36f4b_M1 phases=3 bus1=BT4459664545395696BR03.1.2.3.4 conn=Wye kv=0.22 pf=1.0 pmpp=4.402 kva=3.827 %pmpp=100 irradiance=0.8 temperature=25 %cutin=0.1 %cutout=0.1 effcurve=Myeff P-TCurve=MyPvsT Daily=PVIrrad_RBRR1303 TDaily=MyTemp
New PVsystem.BT_1542d5243824226103eaeea28e96d238b4467443dc39adf7f6bcc1ba616bbf19_M1 phases=3 bus1=BT4430021245289456BR03.1.2.3.4 conn=Wye kv=0.22 pf=1.0 pmpp=0.081 kva=0.071 %pmpp=100 irradiance=0.8 temperature=25 %cutin=0.1 %cutout=0.1 effcurve=Myeff P-TCurve=MyPvsT Daily=PVIrrad_RBRR1303 TDaily=MyTemp
