! DU_1_GeradoresMT_391_BRR_RBRR1303

New PVsystem.GD phases=3 bus1= MT4690029944751976BR03 kv=13.8 pf=1 kva=500 pmpp=500 irradiance=1 temperature=25 %cutin=0.1 %cutout=0.1 Daily=PVIrrad_diaria conn=Delta
