! DU_1_ChavesMT_391_CSO_RCSO1307
New "Line.CMT_290BF000011419" phases=3 bus1="MT3941427939786713CS07.1.2.3" bus2="MT2995210ID.1.2.3" r1=0.001 r0=0.001 x1=0 x0=0 c1=0 c0=0 length=0.001 Switch=y
New "Line.CMT_150BF000011389" phases=3 bus1="MT3934392439534487CS07.1.2.3" bus2="MT2989270ID.1.2.3" r1=0.001 r0=0.001 x1=0 x0=0 c1=0 c0=0 length=0.001 Switch=y
New "Line.CMT_150BF006018979" phases=3 bus1="MT3944740839693853CS07.1.2.3" bus2="MT309751701ID.1.2.3" r1=0.001 r0=0.001 x1=0 x0=0 c1=0 c0=0 length=0.001 Switch=y
New "Line.CMT_150BF005127579" phases=3 bus1="MT3957488239623016CS07.1.2.3" bus2="MT2981036ID.1.2.3" r1=0.001 r0=0.001 x1=0 x0=0 c1=0 c0=0 length=0.001 Switch=y
New "Line.CMT_150BF000011379" phases=3 bus1="MT3935725139627194CS07.1.2.3" bus2="MT2988354ID.1.2.3" r1=0.001 r0=0.001 x1=0 x0=0 c1=0 c0=0 length=0.001 Switch=y
!New "Line.CMT_150CF000709319" phases=3 bus1="MT3935369939628732CSMT.1.2.3.4" bus2="MT2986563ID.1.2.3.4" r1=0.001 r0=0.001 x1=0 x0=0 c1=0 c0=0 length=0.001 Switch=y
New "Line.CMT_150RL000708949" phases=3 bus1="MT3938481339315743CS07.1.2.3" bus2="MT2981755ID.1.2.3" r1=0.001 r0=0.001 x1=0 x0=0 c1=0 c0=0 length=0.001 Switch=y
New "Line.CMT_150BF000025249" phases=3 bus1="MT3942337739277271CS07.1.2.3" bus2="MT2989857ID.1.2.3" r1=0.001 r0=0.001 x1=0 x0=0 c1=0 c0=0 length=0.001 Switch=y
New "Line.CMT_150BR000010839" phases=3 bus1="MT3867261639618721CS07.1.2.3" bus2="MT2985995ID.1.2.3" r1=0.001 r0=0.001 x1=0 x0=0 c1=0 c0=0 length=0.001 Switch=y
New "Line.CMT_150BF005351449" phases=3 bus1="MT3946184139659304CS07.1.2.3" bus2="MT2988240ID.1.2.3" r1=0.001 r0=0.001 x1=0 x0=0 c1=0 c0=0 length=0.001 Switch=y
New "Line.CMT_150BR000013809" phases=1 bus1="MT3890995539553984CS07.1" bus2="MT2996456ID.1" r1=0.001 r0=0.001 x1=0 x0=0 c1=0 c0=0 length=0.001 Switch=y
New "Line.CMT_150BF000010929" phases=3 bus1="MT3895345939757377CS07.1.2.3" bus2="MT2982980ID.1.2.3" r1=0.001 r0=0.001 x1=0 x0=0 c1=0 c0=0 length=0.001 Switch=y
New "Line.CMT_290BF000011369" phases=3 bus1="MT392465283966103CS07.1.2.3" bus2="MT2998528ID.1.2.3" r1=0.001 r0=0.001 x1=0 x0=0 c1=0 c0=0 length=0.001 Switch=y
New "Line.CMT_150BF000010869" phases=3 bus1="MT3875991439602943CS07.1.2.3" bus2="MT2988492ID.1.2.3" r1=0.001 r0=0.001 x1=0 x0=0 c1=0 c0=0 length=0.001 Switch=y
New "Line.CMT_290BF000011059" phases=3 bus1="MT3903174439903579CS07.1.2.3" bus2="MT2990038ID.1.2.3" r1=0.001 r0=0.001 x1=0 x0=0 c1=0 c0=0 length=0.001 Switch=y
New "Line.CMT_150CF005392629" phases=3 bus1="MT3937851839310671CS07.1.2.3" bus2="MT2993002ID.1.2.3" r1=0.001 r0=0.001 x1=0 x0=0 c1=0 c0=0 length=0.001 Switch=y
New "Line.CMT_150BR005593629" phases=3 bus1="MT3942814339346847CS07.1.2.3" bus2="MT126411885ID.1.2.3" r1=0.001 r0=0.001 x1=0 x0=0 c1=0 c0=0 length=0.001 Switch=y
New "Line.CMT_150BF005168659" phases=3 bus1="MT3915008539314284CS07.1.2.3" bus2="MT2990044ID.1.2.3" r1=0.001 r0=0.001 x1=0 x0=0 c1=0 c0=0 length=0.001 Switch=y
New "Line.CMT_150BF000003369" phases=3 bus1="MT3913762239313688CS07.1.2.3" bus2="MT2987960ID.1.2.3" r1=0.001 r0=0.001 x1=0 x0=0 c1=0 c0=0 length=0.001 Switch=y
New "Line.CMT_150BF005410019" phases=3 bus1="MT3891627539576245CS07.1.2.3" bus2="MT2992306ID.1.2.3" r1=0.001 r0=0.001 x1=0 x0=0 c1=0 c0=0 length=0.001 Switch=y
New "Line.CMT_150BR000009249" phases=3 bus1="MT3939698339346167CS07.1.2.3" bus2="MT2982758ID.1.2.3" r1=0.001 r0=0.001 x1=0 x0=0 c1=0 c0=0 length=0.001 Switch=y
New "Line.CMT_150BR000010859" phases=3 bus1="MT3892510739634468CS07.1.2.3" bus2="MT2999205ID.1.2.3" r1=0.001 r0=0.001 x1=0 x0=0 c1=0 c0=0 length=0.001 Switch=y
New "Line.CMT_290BF000011429" phases=3 bus1="MT3943343839778264CS07.1.2.3" bus2="MT2993627ID.1.2.3" r1=0.001 r0=0.001 x1=0 x0=0 c1=0 c0=0 length=0.001 Switch=y
New "Line.CMT_150BF005371029" phases=3 bus1="MT3895065539819949CS07.1.2.3" bus2="MT2982063ID.1.2.3" r1=0.001 r0=0.001 x1=0 x0=0 c1=0 c0=0 length=0.001 Switch=y
New "Line.CMT_130CF000716899" phases=3 bus1="MT3827039639749586CS07.1.2.3" bus2="MT2992641ID.1.2.3" r1=0.001 r0=0.001 x1=0 x0=0 c1=0 c0=0 length=0.001 Switch=y
New "Line.CMT_150RL005858869" phases=3 bus1="MT3887756239622704CS07.1.2.3" bus2="MT201863862ID.1.2.3" r1=0.001 r0=0.001 x1=0 x0=0 c1=0 c0=0 length=0.001 Switch=y
New "Line.CMT_150BF000003449" phases=3 bus1="MT3932913639337958CS07.1.2.3" bus2="MT2994217ID.1.2.3" r1=0.001 r0=0.001 x1=0 x0=0 c1=0 c0=0 length=0.001 Switch=y
New "Line.CMT_150BF000011469" phases=3 bus1="MT3946851439691746CS07.1.2.3" bus2="MT2987347ID.1.2.3" r1=0.001 r0=0.001 x1=0 x0=0 c1=0 c0=0 length=0.001 Switch=y
New "Line.CMT_150BR000011489" phases=3 bus1="MT3950830739666841CS07.1.2.3" bus2="MT2991910ID.1.2.3" r1=0.001 r0=0.001 x1=0 x0=0 c1=0 c0=0 length=0.001 Switch=y
New "Line.CMT_130CF000716909" phases=3 bus1="MT38272339746478CS07.1.2.3" bus2="MT2997577ID.1.2.3" r1=0.001 r0=0.001 x1=0 x0=0 c1=0 c0=0 length=0.001 Switch=y
New "Line.CMT_130CF000702349" phases=3 bus1="MT3834335639707181CS07.1.2.3" bus2="MT2997600ID.1.2.3" r1=0.001 r0=0.001 x1=0 x0=0 c1=0 c0=0 length=0.001 Switch=y
New "Line.CMT_150FF005546399" phases=3 bus1="MT3959568139649037CS07.1.2.3" bus2="MT124016732ID.1.2.3" r1=0.001 r0=0.001 x1=0 x0=0 c1=0 c0=0 length=0.001 Switch=y
New "Line.CMT_150BF005455089" phases=3 bus1="MT391213439309144CS07.1.2.3" bus2="MT2999294ID.1.2.3" r1=0.001 r0=0.001 x1=0 x0=0 c1=0 c0=0 length=0.001 Switch=y
New "Line.CMT_150BF005191059" phases=1 bus1="MT3891588239551024CS07.3" bus2="MT2983429ID.3" r1=0.001 r0=0.001 x1=0 x0=0 c1=0 c0=0 length=0.001 Switch=y
New "Line.CMT_150CF000702379" phases=3 bus1="MT3892162239345893CS07.1.2.3" bus2="MT2985515ID.1.2.3" r1=0.001 r0=0.001 x1=0 x0=0 c1=0 c0=0 length=0.001 Switch=y
New "Line.CMT_150BF000024189" phases=1 bus1="MT3891641839632225CS07.2" bus2="MT2999163ID.2" r1=0.001 r0=0.001 x1=0 x0=0 c1=0 c0=0 length=0.001 Switch=y
New "Line.CMT_290RL006013999" phases=3 bus1="MT393346339670951CS07.1.2.3" bus2="MT309751664ID.1.2.3" r1=0.001 r0=0.001 x1=0 x0=0 c1=0 c0=0 length=0.001 Switch=y
New "Line.CMT_150BR000011399" phases=3 bus1="MT3934598139515428CS07.1.2.3" bus2="MT2980804ID.1.2.3" r1=0.001 r0=0.001 x1=0 x0=0 c1=0 c0=0 length=0.001 Switch=y
New "Line.CMT_150BR000011509" phases=3 bus1="MT3954600539656149CS07.1.2.3" bus2="MT2981053ID.1.2.3" r1=0.001 r0=0.001 x1=0 x0=0 c1=0 c0=0 length=0.001 Switch=y
New "Line.CMT_150BF000003359" phases=3 bus1="MT3909143139309429CS07.1.2.3" bus2="MT2989691ID.1.2.3" r1=0.001 r0=0.001 x1=0 x0=0 c1=0 c0=0 length=0.001 Switch=y
New "Line.CMT_150BF000023869" phases=3 bus1="MT3895306439344609CS07.1.2.3" bus2="MT2990549ID.1.2.3" r1=0.001 r0=0.001 x1=0 x0=0 c1=0 c0=0 length=0.001 Switch=y
New "Line.CMT_150CF005395079" phases=3 bus1="MT3891643839339868CS07.1.2.3" bus2="MT2992366ID.1.2.3" r1=0.001 r0=0.001 x1=0 x0=0 c1=0 c0=0 length=0.001 Switch=y
New "Line.CMT_150CF000709199" phases=3 bus1="MT3887519539623983CS07.1.2.3" bus2="MT2981287ID.1.2.3" r1=0.001 r0=0.001 x1=0 x0=0 c1=0 c0=0 length=0.001 Switch=y
New "Line.CMT_290BR000010969" phases=3 bus1="MT3909045439740636CS07.1.2.3" bus2="MT2988548ID.1.2.3" r1=0.001 r0=0.001 x1=0 x0=0 c1=0 c0=0 length=0.001 Switch=y
New "Line.CMT_130BF005503889" phases=3 bus1="MT3835378839706093CS07.1.2.3" bus2="MT49065403ID.1.2.3" r1=0.001 r0=0.001 x1=0 x0=0 c1=0 c0=0 length=0.001 Switch=y
New "Line.CMT_130BF005503879" phases=3 bus1="MT3835376139706351CS07.1.2.3" bus2="MT49065376ID.1.2.3" r1=0.001 r0=0.001 x1=0 x0=0 c1=0 c0=0 length=0.001 Switch=y
New "Line.CMT_130TD000716869" phases=3 bus1="MT3818263539928446CS07.1.2.3" bus2="MT2980860ID.1.2.3" r1=0.001 r0=0.001 x1=0 x0=0 c1=0 c0=0 length=0.001 Switch=y
New "Line.CMT_150BR000024599" phases=3 bus1="MT3891486439394982CS07.1.2.3" bus2="MT2987057ID.1.2.3" r1=0.001 r0=0.001 x1=0 x0=0 c1=0 c0=0 length=0.001 Switch=y
New "Line.CMT_130BF005582249" phases=3 bus1="MT3836444939763649CS07.1.2.3" bus2="MT125964306ID.1.2.3" r1=0.001 r0=0.001 x1=0 x0=0 c1=0 c0=0 length=0.001 Switch=y
New "Line.CMT_150BR000011449" phases=3 bus1="MT394434743968169CS07.1.2.3" bus2="MT2982129ID.1.2.3" r1=0.001 r0=0.001 x1=0 x0=0 c1=0 c0=0 length=0.001 Switch=y
New "Line.CMT_150BF005991969" phases=3 bus1="MT3907892439528804CS07.1.2.3" bus2="MT306732920ID.1.2.3" r1=0.001 r0=0.001 x1=0 x0=0 c1=0 c0=0 length=0.001 Switch=y
New "Line.CMT_150BF000011439" phases=3 bus1="MT3942372639667387CS07.1.2.3" bus2="MT2996120ID.1.2.3" r1=0.001 r0=0.001 x1=0 x0=0 c1=0 c0=0 length=0.001 Switch=y
New "Line.CMT_290CF000709239" phases=3 bus1="MT3902671139741087CS07.1.2.3" bus2="MT2995543ID.1.2.3" r1=0.001 r0=0.001 x1=0 x0=0 c1=0 c0=0 length=0.001 Switch=y
New "Line.CMT_130CF000008709" phases=3 bus1="MT3818501139931759CS07.1.2.3" bus2="MT2992260ID.1.2.3" r1=0.001 r0=0.001 x1=0 x0=0 c1=0 c0=0 length=0.001 Switch=y
!New "Line.CMT_150RL005543359" phases=3 bus1="MT389129033933938CS07.1.2.3" bus2="MT123443913ID.1.2.3" r1=0.001 r0=0.001 x1=0 x0=0 c1=0 c0=0 length=0.001 Switch=y
New "Line.CMT_150CF005637649" phases=3 bus1="MT3942680739346617CS07.1.2.3" bus2="MT131203626ID.1.2.3" r1=0.001 r0=0.001 x1=0 x0=0 c1=0 c0=0 length=0.001 Switch=y
New "Line.CMT_150FF000011459" phases=3 bus1="MT3944363739699751CS07.1.2.3" bus2="MT2993822ID.1.2.3" r1=0.001 r0=0.001 x1=0 x0=0 c1=0 c0=0 length=0.001 Switch=y
New "Line.CMT_150BF005235319" phases=3 bus1="MT3916918439374687CS07.1.2.3" bus2="MT2981764ID.1.2.3" r1=0.001 r0=0.001 x1=0 x0=0 c1=0 c0=0 length=0.001 Switch=y
New "Line.CMT_150BF005214039" phases=3 bus1="MT3919266939323818CS07.1.2.3" bus2="MT2997060ID.1.2.3" r1=0.001 r0=0.001 x1=0 x0=0 c1=0 c0=0 length=0.001 Switch=y
New "Line.CMT_130BF000023759" phases=3 bus1="MT3845885939661464CS07.1.2.3" bus2="MT2995167ID.1.2.3" r1=0.001 r0=0.001 x1=0 x0=0 c1=0 c0=0 length=0.001 Switch=y
New "Line.CMT_150BF000010819" phases=3 bus1="MT3873394839627973CS07.1.2.3" bus2="MT2981731ID.1.2.3" r1=0.001 r0=0.001 x1=0 x0=0 c1=0 c0=0 length=0.001 Switch=y
New "Line.CMT_130CF000709179" phases=3 bus1="MT3862385539618461CS07.1.2.3" bus2="MT2982146ID.1.2.3" r1=0.001 r0=0.001 x1=0 x0=0 c1=0 c0=0 length=0.001 Switch=y
New "Line.CMT_150BF005593399" phases=3 bus1="MT394269293934392CS07.1.2.3" bus2="MT126397228ID.1.2.3" r1=0.001 r0=0.001 x1=0 x0=0 c1=0 c0=0 length=0.001 Switch=y
New "Line.CMT_150BF005845469" phases=3 bus1="MT3941148239334368CS07.1.2.3" bus2="MT201078024ID.1.2.3" r1=0.001 r0=0.001 x1=0 x0=0 c1=0 c0=0 length=0.001 Switch=y
New "Line.CMT_150BF005593389" phases=3 bus1="MT3943853939330246CS07.1.2.3" bus2="MT126397221ID.1.2.3" r1=0.001 r0=0.001 x1=0 x0=0 c1=0 c0=0 length=0.001 Switch=y
New "Line.CMT_150BF005429569" phases=3 bus1="MT3957477939628272CS07.1.2.3" bus2="MT2993998ID.1.2.3" r1=0.001 r0=0.001 x1=0 x0=0 c1=0 c0=0 length=0.001 Switch=y
New "Line.CMT_150BR000010949" phases=3 bus1="MT3893508439807383CS07.1.2.3" bus2="MT2993368ID.1.2.3" r1=0.001 r0=0.001 x1=0 x0=0 c1=0 c0=0 length=0.001 Switch=y
New "Line.CMT_150BR000010309" phases=3 bus1="MT3883452239618398CS07.1.2.3" bus2="MT2984569ID.1.2.3" r1=0.001 r0=0.001 x1=0 x0=0 c1=0 c0=0 length=0.001 Switch=y
New "Line.CMT_150BF006231149" phases=1 bus1="MT3877886339501208CS07.1" bus2="MT324776320ID.1" r1=0.001 r0=0.001 x1=0 x0=0 c1=0 c0=0 length=0.001 Switch=y
New "Line.CMT_150BF000011409" phases=3 bus1="MT3941141639534187CS07.1.2.3" bus2="MT2986854ID.1.2.3" r1=0.001 r0=0.001 x1=0 x0=0 c1=0 c0=0 length=0.001 Switch=y
New "Line.CMT_150BF000011539" phases=3 bus1="MT3951620639683186CS07.1.2.3" bus2="MT2996754ID.1.2.3" r1=0.001 r0=0.001 x1=0 x0=0 c1=0 c0=0 length=0.001 Switch=y
New "Line.CMT_150BF000010939" phases=3 bus1="MT3895612539754824CS07.1.2.3" bus2="MT2985491ID.1.2.3" r1=0.001 r0=0.001 x1=0 x0=0 c1=0 c0=0 length=0.001 Switch=y
New "Line.CMT_150FF000011499" phases=3 bus1="MT3951473839673286CS07.1.2.3" bus2="MT2986019ID.1.2.3" r1=0.001 r0=0.001 x1=0 x0=0 c1=0 c0=0 length=0.001 Switch=y
New "Line.CMT_130BF005589909" phases=3 bus1="MT3836025839762109CS07.1.2.3" bus2="MT126214682ID.1.2.3" r1=0.001 r0=0.001 x1=0 x0=0 c1=0 c0=0 length=0.001 Switch=y
New "Line.CMT_150BF000011529" phases=3 bus1="MT396395239682359CS07.1.2.3" bus2="MT2991148ID.1.2.3" r1=0.001 r0=0.001 x1=0 x0=0 c1=0 c0=0 length=0.001 Switch=y
!New "Line.CMT_150RL000716589" phases=3 bus1="MT3941259639267149CS07.1.2.3" bus2="MT2981328ID.1.2.3" r1=0.001 r0=0.001 x1=0 x0=0 c1=0 c0=0 length=0.001 Switch=y
New "Line.CMT_150RL006011969" phases=3 bus1="MT3939725639355713CS07.1.2.3" bus2="MT309518686ID.1.2.3" r1=0.001 r0=0.001 x1=0 x0=0 c1=0 c0=0 length=0.001 Switch=y
!New "Line.CMT_150FF006050499" phases=3 bus1="MT3942499439316112CSMT.1.2.3.4" bus2="MT314857608ID.1.2.3.4" r1=0.001 r0=0.001 x1=0 x0=0 c1=0 c0=0 length=0.001 Switch=y
!New "Line.CMT_150RL006011689" phases=3 bus1="MT394507339333087CS07.1.2.3" bus2="MT309480171ID.1.2.3" r1=0.001 r0=0.001 x1=0 x0=0 c1=0 c0=0 length=0.001 Switch=y
!New "Line.CMT_130RL005422089" phases=3 bus1="MT3833891739710563CS07.1.2.3" bus2="MT2995314ID.1.2.3" r1=0.001 r0=0.001 x1=0 x0=0 c1=0 c0=0 length=0.001 Switch=y
New "Line.CMT_290BF000010979" phases=3 bus1="MT390707153973694CS07.1.2.3" bus2="MT2994954ID.1.2.3" r1=0.001 r0=0.001 x1=0 x0=0 c1=0 c0=0 length=0.001 Switch=y
!New "Line.CMT_150CF006013989" phases=3 bus1="MT3937627239501818CSMT.1.2.3" bus2="MT309751663ID.1.2.3" r1=0.001 r0=0.001 x1=0 x0=0 c1=0 c0=0 length=0.001 Switch=y
New "Line.CMT_150CF005626189" phases=3 bus1="MT3940072339375687CS07.1.2.3" bus2="MT128401515ID.1.2.3" r1=0.001 r0=0.001 x1=0 x0=0 c1=0 c0=0 length=0.001 Switch=y
New "Line.CMT_150CF000708789" phases=3 bus1="MT3941544439270649CS07.1.2.3" bus2="MT2983142ID.1.2.3" r1=0.001 r0=0.001 x1=0 x0=0 c1=0 c0=0 length=0.001 Switch=y

! ----------------Chave abaixo foi retirada para ficar mais parecida com a rede real (SINAP)
! New "Line.CMT_150RL005628959" phases=3 bus1="MT3920108539322983CS07.1.2.3" bus2="MT128754544ID.1.2.3" r1=0.001 r0=0.001 x1=0 x0=0 c1=0 c0=0 length=0.001 Switch=y


New "Line.CMT_150BR000005149" phases=3 bus1="MT3891002239816787CS07.1.2.3" bus2="MT2990591ID.1.2.3" r1=0.001 r0=0.001 x1=0 x0=0 c1=0 c0=0 length=0.001 Switch=y
New "Line.CMT_130CF000702459" phases=3 bus1="MT382820739740975CS07.1.2.3" bus2="MT2991112ID.1.2.3" r1=0.001 r0=0.001 x1=0 x0=0 c1=0 c0=0 length=0.001 Switch=y
New "Line.CMT_150BF005198749" phases=1 bus1="MT3893043639641936CS07.1" bus2="MT2982488ID.1" r1=0.001 r0=0.001 x1=0 x0=0 c1=0 c0=0 length=0.001 Switch=y
New "Line.CMT_130CF005596589" phases=3 bus1="MT3824600239799985CS07.1.2.3" bus2="MT126620084ID.1.2.3" r1=0.001 r0=0.001 x1=0 x0=0 c1=0 c0=0 length=0.001 Switch=y
New "Line.CMT_150BF000024229" phases=1 bus1="MT3915418439347905CS07.3" bus2="MT2996898ID.3" r1=0.001 r0=0.001 x1=0 x0=0 c1=0 c0=0 length=0.001 Switch=y
!New "Line.CMT_150FF005593379" phases=3 bus1="MT3944953739339404CSMT.1.2.3.4" bus2="MT126397214ID.1.2.3.4" r1=0.001 r0=0.001 x1=0 x0=0 c1=0 c0=0 length=0.001 Switch=y
!New "Line.CMT_150RL000715789" phases=3 bus1="MT3942842339286787CS07.1.2.3" bus2="MT2983818ID.1.2.3" r1=0.001 r0=0.001 x1=0 x0=0 c1=0 c0=0 length=0.001 Switch=y
New "Line.CMT_150BF000010809" phases=3 bus1="MT3870824239620459CS07.1.2.3" bus2="MT2985629ID.1.2.3" r1=0.001 r0=0.001 x1=0 x0=0 c1=0 c0=0 length=0.001 Switch=y
New "Line.CMT_150BF000010849" phases=3 bus1="MT3889412239631593CS07.1.2.3" bus2="MT2984233ID.1.2.3" r1=0.001 r0=0.001 x1=0 x0=0 c1=0 c0=0 length=0.001 Switch=y
!New "Line.CMT_150RL005545229" phases=3 bus1="MT3890171139337504CS07.1.2.3" bus2="MT123936353ID.1.2.3" r1=0.001 r0=0.001 x1=0 x0=0 c1=0 c0=0 length=0.001 Switch=y
New "Line.CMT_150RL005872539" phases=3 bus1="MT3937452739497014CS07.1.2.3" bus2="MT203304749ID.1.2.3" r1=0.001 r0=0.001 x1=0 x0=0 c1=0 c0=0 length=0.001 Switch=y
New "Line.CMT_150CF000709409" phases=3 bus1="MT3901490239740386CS07.1.2.3" bus2="MT2989535ID.1.2.3" r1=0.001 r0=0.001 x1=0 x0=0 c1=0 c0=0 length=0.001 Switch=y
New "Line.CMT_150BF005821689" phases=3 bus1="MT3875922239602791CS07.1.2.3" bus2="MT199865172ID.1.2.3" r1=0.001 r0=0.001 x1=0 x0=0 c1=0 c0=0 length=0.001 Switch=y
New "Line.CMT_150BF000007369" phases=3 bus1="MT3931591739338635CS07.1.2.3" bus2="MT2997226ID.1.2.3" r1=0.001 r0=0.001 x1=0 x0=0 c1=0 c0=0 length=0.001 Switch=y
New "Line.CMT_130FF005497909" phases=3 bus1="MT3836431139725443CS07.1.2.3" bus2="MT49063838ID.1.2.3" r1=0.001 r0=0.001 x1=0 x0=0 c1=0 c0=0 length=0.001 Switch=y
New "Line.CMT_8565461" phases=3 bus1="MT8565062ID.1.2.3" bus2="MT8565461ID.1.2.3" r1=0.001 r0=0.001 x1=0 x0=0 c1=0 c0=0 length=0.001 Switch=y
New "Line.CMT_150BF005821629" phases=3 bus1="MT3895286839824047CS07.1.2.3" bus2="MT199862760ID.1.2.3" r1=0.001 r0=0.001 x1=0 x0=0 c1=0 c0=0 length=0.001 Switch=y
!New "Line.CMT_130TD000717039" phases=3 bus1="MT3818275139928508CS07.1.2.3" bus2="MT2988736ID.1.2.3" r1=0.001 r0=0.001 x1=0 x0=0 c1=0 c0=0 length=0.001 Switch=y
New "Line.CMT_150CF000709229" phases=3 bus1="MT3902096839739206CS07.1.2.3" bus2="MT2990901ID.1.2.3" r1=0.001 r0=0.001 x1=0 x0=0 c1=0 c0=0 length=0.001 Switch=y
New "Line.CMT_150BF005163299" phases=1 bus1="MT3894234139644376CS07.1" bus2="MT2986580ID.1" r1=0.001 r0=0.001 x1=0 x0=0 c1=0 c0=0 length=0.001 Switch=y
New "Line.CMT_150BF005245349" phases=3 bus1="MT394177463970508CS07.1.2.3" bus2="MT2983088ID.1.2.3" r1=0.001 r0=0.001 x1=0 x0=0 c1=0 c0=0 length=0.001 Switch=y
New "Line.CMT_150RL005628958_A" phases=3 bus1="MT3920108539322983CS07.1.2.3" bus2="MT203991203ID.1.2.3" r1=0.001 r0=0.001 x1=0 x0=0 c1=0 c0=0 length=0.001 Switch=y
New "Line.CMT_150BF000009119" phases=3 bus1="MT3896029439664689CS07.1.2.3" bus2="MT2990570ID.1.2.3" r1=0.001 r0=0.001 x1=0 x0=0 c1=0 c0=0 length=0.001 Switch=y
New "Line.CMT_150BF005035019" phases=3 bus1="MT3939249939349992CS07.1.2.3" bus2="MT2992816ID.1.2.3" r1=0.001 r0=0.001 x1=0 x0=0 c1=0 c0=0 length=0.001 Switch=y
New "Line.CMT_130BF000010799" phases=3 bus1="MT3863088839627998CS07.1.2.3" bus2="MT2996832ID.1.2.3" r1=0.001 r0=0.001 x1=0 x0=0 c1=0 c0=0 length=0.001 Switch=y
New "Line.CMT_150BR000006299" phases=3 bus1="MT3876376839616115CS07.1.2.3" bus2="MT2987595ID.1.2.3" r1=0.001 r0=0.001 x1=0 x0=0 c1=0 c0=0 length=0.001 Switch=y
New "Line.CMT_150RL005134689" phases=3 bus1="MT3888375139626684CS07.1.2.3" bus2="MT2984660ID.1.2.3" r1=0.001 r0=0.001 x1=0 x0=0 c1=0 c0=0 length=0.001 Switch=y
New "Line.CMT_150BR000024199" phases=3 bus1="MT3890707339590682CS07.1.2.3" bus2="MT2984510ID.1.2.3" r1=0.001 r0=0.001 x1=0 x0=0 c1=0 c0=0 length=0.001 Switch=y
New "Line.CMT_150BC005544268_A" phases=3 bus1="MT3935627639323472CS07.1.2.3" bus2="MT199555445ID.1.2.3" r1=0.001 r0=0.001 x1=0 x0=0 c1=0 c0=0 length=0.001 Switch=y
New "Line.CMT_150RL005134688_A" phases=3 bus1="MT3888375139626684CS07.1.2.3" bus2="MT202878567ID.1.2.3" r1=0.001 r0=0.001 x1=0 x0=0 c1=0 c0=0 length=0.001 Switch=y
New "Line.CMT_130RL005422088_A" phases=3 bus1="MT3833891739710563CS07.1.2.3" bus2="MT202879006ID.1.2.3" r1=0.001 r0=0.001 x1=0 x0=0 c1=0 c0=0 length=0.001 Switch=y
New "Line.CMT_150BC005627278_A" phases=3 bus1="MT3881442939615424CS07.1.2.3" bus2="MT206665332ID.1.2.3" r1=0.001 r0=0.001 x1=0 x0=0 c1=0 c0=0 length=0.001 Switch=y
New "Line.CMT_150RL005872538_A" phases=3 bus1="MT3937452739497014CS07.1.2.3" bus2="MT257335621ID.1.2.3" r1=0.001 r0=0.001 x1=0 x0=0 c1=0 c0=0 length=0.001 Switch=y
New "Line.CMT_150RL005543358_A" phases=3 bus1="MT389129033933938CS07.1.2.3" bus2="MT204827384ID.1.2.3" r1=0.001 r0=0.001 x1=0 x0=0 c1=0 c0=0 length=0.001 Switch=y
New "Line.CMT_150RL000715788_A" phases=3 bus1="MT3942842339286787CS07.1.2.3" bus2="MT202878535ID.1.2.3" r1=0.001 r0=0.001 x1=0 x0=0 c1=0 c0=0 length=0.001 Switch=y
New "Line.CMT_150RL006011968_A" phases=3 bus1="MT3939725639355713CS07.1.2.3" bus2="MT283342740ID.1.2.3" r1=0.001 r0=0.001 x1=0 x0=0 c1=0 c0=0 length=0.001 Switch=y
New "Line.CMT_150RT005510028_A" phases=3 bus1="MT3885212239613128CS07.1.2.3" bus2="MT199555825ID.1.2.3" r1=0.001 r0=0.001 x1=0 x0=0 c1=0 c0=0 length=0.001 Switch=y
New "Line.CMT_150BF005389549" phases=3 bus1="MT3887248739687902CS07.1.2.3" bus2="MT2982696ID.1.2.3" r1=0.001 r0=0.001 x1=0 x0=0 c1=0 c0=0 length=0.001 Switch=y
New "Line.CMT_130BF000010829" phases=3 bus1="MT3856658139640829CS07.1.2.3" bus2="MT2983219ID.1.2.3" r1=0.001 r0=0.001 x1=0 x0=0 c1=0 c0=0 length=0.001 Switch=y
!New "Line.CMT_130FF005497899" phases=3 bus1="MT3836451339725363CSMT.1.2.3.4" bus2="MT49063831ID.1.2.3.4" r1=0.001 r0=0.001 x1=0 x0=0 c1=0 c0=0 length=0.001 Switch=y
New "Line.CMT_150RL000708948_A" phases=3 bus1="MT3938481339315743CS07.1.2.3" bus2="MT202878447ID.1.2.3" r1=0.001 r0=0.001 x1=0 x0=0 c1=0 c0=0 length=0.001 Switch=y
New "Line.CMT_150CF005038049" phases=3 bus1="MT3894752239341854CS07.1.2.3" bus2="MT2992466ID.1.2.3" r1=0.001 r0=0.001 x1=0 x0=0 c1=0 c0=0 length=0.001 Switch=y
New "Line.CMT_150RT005040758_A" phases=3 bus1="MT3906359139313016CS07.1.2.3" bus2="MT202879357ID.1.2.3" r1=0.001 r0=0.001 x1=0 x0=0 c1=0 c0=0 length=0.001 Switch=y
New "Line.CMT_150RL005858868_A" phases=3 bus1="MT3887756239622704CS07.1.2.3" bus2="MT254025201ID.1.2.3" r1=0.001 r0=0.001 x1=0 x0=0 c1=0 c0=0 length=0.001 Switch=y
New "Line.CMT_150RL000716588_A" phases=3 bus1="MT3941259639267149CS07.1.2.3" bus2="MT202878427ID.1.2.3" r1=0.001 r0=0.001 x1=0 x0=0 c1=0 c0=0 length=0.001 Switch=y
New "Line.CMT_290RL006013998_A" phases=3 bus1="MT393346339670951CS07.1.2.3" bus2="MT283832607ID.1.2.3" r1=0.001 r0=0.001 x1=0 x0=0 c1=0 c0=0 length=0.001 Switch=y
New "Line.CMT_150RL006011688_A" phases=3 bus1="MT394507339333087CS07.1.2.3" bus2="MT283253550ID.1.2.3" r1=0.001 r0=0.001 x1=0 x0=0 c1=0 c0=0 length=0.001 Switch=y
